<Lems>

    <!--

        This LEMS file has been automatically generated using PyNeuroML v0.1.7 (libNeuroML v0.2.12)

     -->

    <!-- Specify which component to run -->
    <Target component="SimpleNet"/>

    <!-- Include core NeuroML2 ComponentType definitions -->
    <Include file="Cells.xml"/>
    <Include file="Networks.xml"/>
    <Include file="Simulation.xml"/>

    <Include file="SimpleNet.nml"/>

    <Simulation id="SimpleNet" length="1000ms" step="0.01ms" target="SimpleNet_network">

        <Display id="display_voltages0" title="Voltages Pop0" timeScale="1ms" xmin="-100.0" xmax="1100.0" ymin="-68" ymax="-47">
            <Line id="Pop0[0]: Vm" quantity="Pop0[0]/v" scale="1mV" color="#6aa799" timeScale="1ms"/>
            <Line id="Pop0[1]: Vm" quantity="Pop0[1]/v" scale="1mV" color="#029a72" timeScale="1ms"/>
            <Line id="Pop0[2]: Vm" quantity="Pop0[2]/v" scale="1mV" color="#d340bb" timeScale="1ms"/>
            <Line id="Pop0[3]: Vm" quantity="Pop0[3]/v" scale="1mV" color="#4c73a9" timeScale="1ms"/>
            <Line id="Pop0[4]: Vm" quantity="Pop0[4]/v" scale="1mV" color="#5e503a" timeScale="1ms"/>
        </Display>

        <OutputFile id="Volts0_file" fileName="v_pop0.dat">
            <OutputColumn id="v0" quantity="Pop0[0]/v"/>
            <OutputColumn id="v1" quantity="Pop0[1]/v"/>
            <OutputColumn id="v2" quantity="Pop0[2]/v"/>
            <OutputColumn id="v3" quantity="Pop0[3]/v"/>
            <OutputColumn id="v4" quantity="Pop0[4]/v"/>
        </OutputFile>

    </Simulation>

</Lems>
