<neuroml xmlns="http://www.neuroml.org/schema/neuroml2"  xmlns:xs="http://www.w3.org/2001/XMLSchema" xmlns:xsi="http://www.w3.org/2001/XMLSchema-instance" xsi:schemaLocation="http://www.neuroml.org/schema/neuroml2 https://raw.github.com/NeuroML/NeuroML2/development/Schemas/NeuroML2/NeuroML_v2beta4.xsd" id="SpikingNet">
    <expTwoSynapse id="syn0" gbase="1nS" erev="0mV" tauDecay="10ms" tauRise="0.5ms"/>
    <iafCell id="iaf0" leakReversal="-60mV" thresh="-50mV" reset="-65mV" C="1.0 nF" leakConductance="10 nS"/>
    <poissonFiringSynapse id="poissonFiringSyn" averageRate="150 Hz" synapse="syn0" spikeTarget="./syn0"/>
    <network id="SpikingNet_network">
        <population id="Pop0" component="iaf0" size="10"/>
        <population id="Pop1" component="iaf0" size="10"/>
        <projection id="Proj0" presynapticPopulation="Pop0" postsynapticPopulation="Pop1" synapse="syn0">
            <connection id="0" preCellId="../Pop0[0]" preSegmentId="0" preFractionAlong="0.5" postCellId="../Pop1[0]" postSegmentId="0" postFractionAlong="0.5"/>
            <connection id="1" preCellId="../Pop0[0]" preSegmentId="0" preFractionAlong="0.5" postCellId="../Pop1[1]" postSegmentId="0" postFractionAlong="0.5"/>
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        </projection>
        <explicitInput target="Pop0[0]" input="poissonFiringSyn" destination="synapses"/>
        <explicitInput target="Pop0[1]" input="poissonFiringSyn" destination="synapses"/>
        <explicitInput target="Pop0[2]" input="poissonFiringSyn" destination="synapses"/>
        <explicitInput target="Pop0[3]" input="poissonFiringSyn" destination="synapses"/>
        <explicitInput target="Pop0[4]" input="poissonFiringSyn" destination="synapses"/>
        <explicitInput target="Pop0[5]" input="poissonFiringSyn" destination="synapses"/>
        <explicitInput target="Pop0[6]" input="poissonFiringSyn" destination="synapses"/>
        <explicitInput target="Pop0[7]" input="poissonFiringSyn" destination="synapses"/>
        <explicitInput target="Pop0[8]" input="poissonFiringSyn" destination="synapses"/>
        <explicitInput target="Pop0[9]" input="poissonFiringSyn" destination="synapses"/>
    </network>
</neuroml>
