<?xml version="1.0" encoding="ISO-8859-1"?>

<!--
       This file has been generated by neuroConstruct because a cell mechanism (ChannelMLCell Mechanism [InstanceName: ar, channelMLFile: AR_Chan.xml])
      has a different set of parameters (erev = -35.0, m0 = 0.25) on a group of sections.

      Conversion of the original NML2 file to use the updated parameters is implemented in handleExtraParamsForNml2()
      in https://github.com/NeuralEnsemble/neuroConstruct/blob/master/src/ucl/physiol/neuroconstruct/neuroml/NeuroMLFileManager.java
      See that file to check/improve this conversion
-->

<neuroml xmlns="http://www.neuroml.org/schema/neuroml2" xmlns:xsi="http://www.w3.org/2001/XMLSchema-instance" xsi:schemaLocation="http://www.neuroml.org/schema/neuroml2 https://raw.github.com/NeuroML/NeuroML2/development/Schemas/NeuroML2/NeuroML_v2beta4.xsd" id="ar__m00_25">

    <notes>ChannelML file based on Traub et al. 2003</notes>

    <ionChannel id="ar__m00_25" conductance="10pS" type="ionChannelHH" species="ar">

        <notes>Anomalous Rectifier conductance, also known as h-conductance (hyperpolarizing). Based on NEURON port of FRB L2/3 model from Traub et al 2003. Same channel used in Traub et al 2005</notes>

        <annotation>
            <rdf:RDF xmlns:rdf="http://www.w3.org/1999/02/22-rdf-syntax-ns#">
                <rdf:Description rdf:about="ar">

                    <bqmodel:isDescribedBy xmlns:bqmodel="http://biomodels.net/model-qualifiers/">
                        <rdf:Bag>
                            <rdf:li>Roger D. Traub, Eberhard H. Buhl, Tengis Gloveli, and Miles A. Whittington
Fast Rhythmic Bursting Can Be Induced in Layer 2/3 Cortical Neurons by Enhancing Persistent Na+ Conductance or by Blocking BK Channels
J Neurophysiol 89: 909-921, 2003</rdf:li>
                            <rdf:li rdf:resource="http://www.ncbi.nlm.nih.gov/entrez/query.fcgi?cmd=Retrieve&amp;db=pubmed&amp;dopt=Abstract&amp;list_uids=12574468"/>
                        </rdf:Bag>
                    </bqmodel:isDescribedBy>

                    <bqmodel:isDescribedBy xmlns:bqmodel="http://biomodels.net/model-qualifiers/">
                        <rdf:Bag>
                            <rdf:li>Roger D. Traub, Diego Contreras, Mark O. Cunningham, Hilary Murray, Fiona E. N. LeBeau, Anita Roopun, Andrea Bibbig, W. Bryan Wilent, Michael J. Higley, and Miles A. Whittington
Single-column thalamocortical network model exhibiting gamma oscillations, sleep spindles, and epileptogenic bursts.
J. Neurophysiol. 93, 2194-2232, 2005</rdf:li>
                            <rdf:li rdf:resource="http://www.ncbi.nlm.nih.gov/pubmed/15525801?dopt=Abstract"/>
                        </rdf:Bag>
                    </bqmodel:isDescribedBy>

                </rdf:Description>
            </rdf:RDF>
        </annotation>

        <gate id="m" type="gateHHtauInf" instances="1">
            <timeCourse type="ar__m00_25_m_tau_tau"/>
            <steadyState type="HHSigmoidVariable" rate="1" scale="-5.5mV" midpoint="-75mV"/>
        </gate>

    </ionChannel>

    <ComponentType name="ar__m00_25_m_tau_tau" extends="baseVoltageDepTime">
        <Constant name="TIME_SCALE" dimension="time" value="1 ms"/>
        <Constant name="VOLT_SCALE" dimension="voltage" value="1 mV"/>
        <!--Note: this parameter (m0) should ideally be defined only once within the ionChannel! Work in progress...-->
        <Constant name="m0" dimension="none" value="0.25"/>

        <Dynamics>
            <DerivedVariable name="V" dimension="none" value="v / VOLT_SCALE"/>
            <DerivedVariable name="t" exposure="t" dimension="time" value="(1 /((exp (-14.6 - (0.086 * V) )) + (exp (-1.87 + (0.07 * V))))) * TIME_SCALE"/>
        </Dynamics>

    </ComponentType>

</neuroml>
