<neuroml xmlns="http://www.neuroml.org/schema/neuroml2"  xmlns:xs="http://www.w3.org/2001/XMLSchema" xmlns:xsi="http://www.w3.org/2001/XMLSchema-instance" xsi:schemaLocation="http://www.neuroml.org/schema/neuroml2 https://raw.github.com/NeuroML/NeuroML2/development/Schemas/NeuroML2/NeuroML_v2beta5.xsd" id="ACNet">
    <notes>

This NeuroML 2 file was generated by OpenCortex v0.1.0 using:
    libNeuroML v0.2.29
    pyNeuroML v0.2.10

    </notes>
    <property tag="Network seed" value="1234"/>
    <include href="ACNet/pyr_4_sym.cell.nml"></include>
    <include href="ACNet/Ca_conc.nml"></include>
    <include href="ACNet/Ca_pyr.channel.nml"></include>
    <include href="ACNet/Kahp_pyr.channel.nml"></include>
    <include href="ACNet/Kdr_pyr.channel.nml"></include>
    <include href="ACNet/LeakConductance_pyr.channel.nml"></include>
    <include href="ACNet/Na_pyr.channel.nml"></include>
    <include href="ACNet/bask.cell.nml"></include>
    <include href="ACNet/Kdr_bask.channel.nml"></include>
    <include href="ACNet/LeakConductance_bask.channel.nml"></include>
    <include href="ACNet/Na_bask.channel.nml"></include>
    <expTwoSynapse id="AMPA_syn" gbase="30e-9S" erev="0mV" tauDecay="0.0031s" tauRise="0.003s"/>
    <expTwoSynapse id="AMPA_syn_inh" gbase="0.15e-9S" erev="0mV" tauDecay="0.0031s" tauRise="0.003s"/>
    <expTwoSynapse id="GABA_syn" gbase="0.6e-9S" erev="-0.080V" tauDecay="0.012s" tauRise="0.005s"/>
    <expTwoSynapse id="GABA_syn_inh" gbase="0S" erev="-0.080V" tauDecay="0.008s" tauRise="0.003s"/>
    <poissonFiringSynapse id="poissonFiringSyn" averageRate="30 Hz" synapse="AMPA_syn" spikeTarget="./AMPA_syn"/>
    <network id="ACNet" type="networkWithTemperature" temperature="32degC">
        <population id="pop_pyr" component="pyr_4_sym" size="48" type="populationList">
            <instance id="0">
                <location x="483.226767845999973" y="22.036629958799999" z="3.74573502929"/>
            </instance>
            <instance id="1">
                <location x="455.487981224999999" y="46.963449868200001" z="291.113786528999981"/>
            </instance>
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        </population>
        <population id="pop_bask" component="bask" size="12" type="populationList">
            <instance id="0">
                <location x="411.418462823000027" y="88.120108795500002" z="437.142889631000003"/>
            </instance>
            <instance id="1">
                <location x="480.012332200999992" y="103.748772019" z="460.533679666000012"/>
            </instance>
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        </population>
        <projection id="Proj_pyr_pyr_pop_pyr_pop_pyr" presynapticPopulation="pop_pyr" postsynapticPopulation="pop_pyr" synapse="AMPA_syn">
            <connectionWD id="0" preCellId="../pop_pyr/10/pyr_4_sym" preFractionAlong="0.905360168929" postCellId="../pop_pyr/0/pyr_4_sym" postSegmentId="5" postFractionAlong="0.387628561272" weight="1." delay="1 ms"/>
            <connectionWD id="1" preCellId="../pop_pyr/24/pyr_4_sym" preFractionAlong="0.588017466156" postCellId="../pop_pyr/0/pyr_4_sym" postSegmentId="4" postFractionAlong="0.814983062213" weight="1." delay="1 ms"/>
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        </projection>
        <projection id="Proj_pyr_bask_pop_pyr_pop_bask" presynapticPopulation="pop_pyr" postsynapticPopulation="pop_bask" synapse="AMPA_syn_inh">
            <connectionWD id="0" preCellId="../pop_pyr/34/pyr_4_sym" preFractionAlong="0.85959910215" postCellId="../pop_bask/0/bask" postFractionAlong="0.304787200997" weight="1." delay="1 ms"/>
            <connectionWD id="1" preCellId="../pop_pyr/8/pyr_4_sym" preFractionAlong="0.076918332876" postCellId="../pop_bask/0/bask" postSegmentId="1" postFractionAlong="0.264300245819" weight="1." delay="1 ms"/>
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        </projection>
        <projection id="Proj_bask_pyr_pop_bask_pop_pyr" presynapticPopulation="pop_bask" postsynapticPopulation="pop_pyr" synapse="GABA_syn">
            <connectionWD id="0" preCellId="../pop_bask/11/bask" preFractionAlong="0.413553187163" postCellId="../pop_pyr/0/pyr_4_sym" postSegmentId="4" postFractionAlong="0.31680077396" weight="1." delay="1 ms"/>
            <connectionWD id="1" preCellId="../pop_bask/6/bask" preFractionAlong="0.980059146519" postCellId="../pop_pyr/0/pyr_4_sym" postSegmentId="7" postFractionAlong="0.0485039793991" weight="1." delay="1 ms"/>
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        </projection>
        <projection id="Proj_bask_bask_pop_bask_pop_bask" presynapticPopulation="pop_bask" postsynapticPopulation="pop_bask" synapse="GABA_syn_inh">
            <connectionWD id="0" preCellId="../pop_bask/2/bask" preFractionAlong="0.441212477649" postCellId="../pop_bask/0/bask" postSegmentId="1" postFractionAlong="0.411570420496" weight="1." delay="1 ms"/>
            <connectionWD id="1" preCellId="../pop_bask/6/bask" preFractionAlong="0.899607907119" postCellId="../pop_bask/0/bask" postSegmentId="1" postFractionAlong="0.12048738863" weight="1." delay="1 ms"/>
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        </projection>
        <inputList id="Stim0" population="pop_pyr" component="poissonFiringSyn">
            <input id="0" target="../pop_pyr/0/pyr_4_sym" destination="synapses" segmentId="0" fractionAlong="0.0662583627906"/>
            <input id="1" target="../pop_pyr/1/pyr_4_sym" destination="synapses" segmentId="0" fractionAlong="0.676897336016"/>
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        </inputList>
    </network>
</neuroml>
