<neuroml xmlns="http://www.neuroml.org/schema/neuroml2"  xmlns:xs="http://www.w3.org/2001/XMLSchema" xmlns:xsi="http://www.w3.org/2001/XMLSchema-instance" xsi:schemaLocation="http://www.neuroml.org/schema/neuroml2 https://raw.github.com/NeuroML/NeuroML2/development/Schemas/NeuroML2/NeuroML_v2beta4.xsd" id="Balanced">
    <notes>

This NeuroML 2 file was generated by OpenCortex v0.0.5 using:
    libNeuroML v0.2.12
    pyNeuroML v0.1.11

    </notes>

    <include href="CaDynamics_E2_NML2.nml"/>

    <ionChannel id="IM" species="k" type="ionChannelHH" conductance="0 pS">
        <notes>ChannelML file containing a single Channel description</notes>
        <gate id="p" instances="1" type="gateHHtauInf">
            <timeCourse type="IM_p_tau_tau"/>
            <steadyState type="IM_p_inf_inf"/>
        </gate>
    </ionChannel>
    <ionChannel id="Kd" species="k" type="ionChannelHH" conductance="0 pS">
        <notes>ChannelML file containing a single Channel description</notes>
        <gate id="n" instances="4" type="gateHHrates">
            <forwardRate type="Kd_n_alpha_rate"/>
            <reverseRate type="Kd_n_beta_rate"/>
        </gate>
    </ionChannel>
    <ionChannel id="LeakConductance" type="ionChannelPassive" conductance="0 pS">
        <notes>ChannelML file containing a single Channel description</notes>
    </ionChannel>
    <ionChannel id="Na" species="na" type="ionChannelHH" conductance="0 pS">
        <notes>ChannelML file containing a single Channel description</notes>
        <gate id="m" instances="3" type="gateHHrates">
            <forwardRate type="Na_m_alpha_rate"/>
            <reverseRate type="Na_m_beta_rate"/>
        </gate>
        <gate id="h" instances="1" type="gateHHrates">
            <forwardRate type="Na_h_alpha_rate"/>
            <reverseRate type="Na_h_beta_rate"/>
        </gate>
    </ionChannel>
    <ionChannel id="pas" type="ionChannelPassive" conductance="10pS">
        <notes>Simple example of a leak/passive conductance. Note: for GENESIS cells with a single leak conductance,
        it is better to use the Rm and Em variables for a passive current.</notes>
    </ionChannel>
    <ionChannel id="Ih" species="hcn" type="ionChannelHH" conductance="10pS">
        <notes>Non-specific cation current

Comment from original mod file:
Reference : :		Kole,Hallermann,and Stuart, J. Neurosci. 2006</notes>
        <gate id="m" instances="1" type="gateHHrates">
            <forwardRate type="HHExpLinearRate" rate="0.076517per_ms" midpoint="-154.9mV" scale="-11.9mV"/>
            <reverseRate type="HHExpRate" rate="0.193per_ms" midpoint="0mV" scale="33.1mV"/>
        </gate>
    </ionChannel>
    <ionChannel id="NaTs2_t" species="na" type="ionChannelHH" conductance="10pS">
        <notes>Fast inactivating Na+ current. Comment from mod file (NaTs2_t.mod): took the NaTa and shifted both activation/inactivation by 6 mv</notes>
        <gate id="m" instances="3" type="gateHHrates">
            <q10Settings type="q10Fixed" fixedQ10="2.95288264"/>
            <forwardRate type="HHExpLinearRate" rate="1.092per_ms" midpoint="-32mV" scale="6mV"/>
            <reverseRate type="HHExpLinearRate" rate="0.744per_ms" midpoint="-32mV" scale="-6mV"/>
        </gate>
        <gate id="h" instances="1" type="gateHHrates">
            <q10Settings type="q10Fixed" fixedQ10="2.95288264"/>
            <forwardRate type="HHExpLinearRate" rate="0.09per_ms" midpoint="-60mV" scale="-6mV"/>
            <reverseRate type="HHExpLinearRate" rate="0.09per_ms" midpoint="-60mV" scale="6mV"/>
        </gate>
    </ionChannel>
    <ionChannel id="SKv3_1" species="k" type="ionChannelHH" conductance="10pS">
        <notes>Fast, non inactivating K+ current

Comment from original mod file:
:Reference : :		Characterization of a Shaw-related potassium channel family in rat brain, The EMBO Journal, vol.11, no.7,2473-2486 (1992)</notes>
        <gate id="m" instances="1" type="gateHHtauInf">
            <timeCourse type="SKv3_1_m_tau_tau"/>
            <steadyState type="HHSigmoidVariable" rate="1." midpoint="18.7mV" scale="9.7mV"/>
        </gate>
    </ionChannel>
    <ionChannel id="Im" species="k" type="ionChannelHH" conductance="10pS">
        <notes>Muscarinic K+ current

Comment from original mod file:
:Reference : :		Adams et al. 1982 - M-currents and other potassium currents in bullfrog sympathetic neurones
:Comment: corrected rates using q10 = 2.3, target temperature 34, orginal 21</notes>
        <gate id="m" instances="1" type="gateHHrates">
            <q10Settings type="q10Fixed" fixedQ10="2.95288264"/>
            <forwardRate type="HHExpRate" rate="0.0033per_ms" midpoint="-35mV" scale="10mV"/>
            <reverseRate type="HHExpRate" rate="0.0033per_ms" midpoint="-35mV" scale="-10mV"/>
        </gate>
    </ionChannel>
    <ionChannel id="NaTa_t" species="na" type="ionChannelHH" conductance="10pS">
        <notes>Fast inactivating Na+ current

Comment from original mod file:
:Reference :Colbert and Pan 2002</notes>
        <gate id="m" instances="3" type="gateHHrates">
            <q10Settings type="q10Fixed" fixedQ10="2.95288264"/>
            <forwardRate type="HHExpLinearRate" rate="1.092per_ms" midpoint="-38mV" scale="6mV"/>
            <reverseRate type="HHExpLinearRate" rate="0.744per_ms" midpoint="-38mV" scale="-6mV"/>
        </gate>
        <gate id="h" instances="1" type="gateHHrates">
            <q10Settings type="q10Fixed" fixedQ10="2.95288264"/>
            <forwardRate type="HHExpLinearRate" rate="0.09per_ms" midpoint="-66mV" scale="-6mV"/>
            <reverseRate type="HHExpLinearRate" rate="0.09per_ms" midpoint="-66mV" scale="6mV"/>
        </gate>
    </ionChannel>
    <ionChannel id="K_Tst" species="k" type="ionChannelHH" conductance="10pS">
        <notes>Fast inactivating K+ current

Comment from original mod file:
:Comment : The transient component of the K current
:Reference : :		Voltage-gated K+ channels in layer 5 neocortical pyramidal neurones from young rats:subtypes and gradients,Korngreen and Sakmann, J. Physiology, 2000
:Comment : shifted -10 mv to correct for junction potential
:Comment: corrected rates using q10 = 2.3, target temperature 34, orginal 21</notes>
        <gate id="m" instances="4" type="gateHHtauInf">
            <q10Settings type="q10Fixed" fixedQ10="2.95288264"/>
            <timeCourse type="K_Tst_m_tau_tau"/>
            <steadyState type="HHSigmoidVariable" rate="1." midpoint="-10mV" scale="19mV"/>
        </gate>
        <gate id="h" instances="1" type="gateHHtauInf">
            <q10Settings type="q10Fixed" fixedQ10="2.95288264"/>
            <timeCourse type="K_Tst_h_tau_tau"/>
            <steadyState type="HHSigmoidVariable" rate="1." midpoint="-76mV" scale="-10mV"/>
        </gate>
    </ionChannel>
    <ionChannel id="Nap_Et2" species="na" type="ionChannelHH" conductance="10pS">
        <notes>Persistent Na+ current

Comment from original mod file:
:Comment : mtau deduced from text (said to be 6 times faster than for NaTa)
:Comment : so I used the equations from NaT and multiplied by 6
:Reference : Modeled according to kinetics derived from Magistretti and Alonso 1999
:Comment: corrected rates using q10 = 2.3, target temperature 34, orginal 21</notes>
        <gate id="m" instances="3" type="gateHHratesTauInf">
            <q10Settings type="q10Fixed" fixedQ10="2.95288264"/>
            <forwardRate type="HHExpLinearRate" rate="1.092per_ms" midpoint="-38mV" scale="6mV"/>
            <reverseRate type="HHExpLinearRate" rate="0.744per_ms" midpoint="-38mV" scale="-6mV"/>
            <timeCourse type="Nap_Et2_m_tau_tau"/>
            <steadyState type="HHSigmoidVariable" rate="1." midpoint="-52.6mV" scale="4.6mV"/>
        </gate>
        <gate id="h" instances="1" type="gateHHratesInf">
            <q10Settings type="q10Fixed" fixedQ10="2.95288264"/>
            <forwardRate type="HHExpLinearRate" rate="1.33344e-05per_ms" midpoint="-17mV" scale="-4.63mV"/>
            <reverseRate type="HHExpLinearRate" rate="1.82522e-05per_ms" midpoint="-64.4mV" scale="2.63mV"/>
            <steadyState type="HHSigmoidVariable" rate="1." midpoint="-48.8mV" scale="-10mV"/>
        </gate>
    </ionChannel>
    <ionChannel id="SK_E2" species="k" type="ionChannelHH" conductance="10pS">
        <notes>Small-conductance, Ca2+ activated K+ current

Comment from original mod file:
: SK-type calcium-activated potassium current
: Reference : Kohler et al. 1996</notes>
        <gate id="z" instances="1" type="gateHHtauInf">
            <timeCourse type="SK_E2_z_tau_tau"/>
            <steadyState type="SK_E2_z_inf_inf"/>
        </gate>
    </ionChannel>
    <ionChannel id="Ca_HVA" species="ca" type="ionChannelHH" conductance="10pS">
        <notes>High voltage activated Ca2+ current.

Comment from original mod file:
Reuveni, Friedman, Amitai, and Gutnick, J.Neurosci. 1993</notes>
        <gate id="m" instances="2" type="gateHHrates">
            <forwardRate type="HHExpLinearRate" rate="0.209per_ms" midpoint="-27mV" scale="3.8mV"/>
            <reverseRate type="HHExpRate" rate="0.94per_ms" midpoint="-75mV" scale="-17mV"/>
        </gate>
        <gate id="h" instances="1" type="gateHHrates">
            <forwardRate type="HHExpRate" rate="0.000457per_ms" midpoint="-13mV" scale="-50mV"/>
            <reverseRate type="HHSigmoidRate" rate="0.0065per_ms" midpoint="-15mV" scale="28mV"/>
        </gate>
    </ionChannel>
    <ionChannel id="K_Pst" species="k" type="ionChannelHH" conductance="10pS">
        <notes>Slow inactivating K+ current

Comment from original mod file:
:Comment : The persistent component of the K current
:Reference : :		Voltage-gated K+ channels in layer 5 neocortical pyramidal neurones from young rats:subtypes and gradients,Korngreen and Sakmann, J. Physiology, 2000
:Comment : shifted -10 mv to correct for junction potential
:Comment: corrected rates using q10 = 2.3, target temperature 34, orginal 21</notes>
        <gate id="m" instances="2" type="gateHHtauInf">
            <q10Settings type="q10Fixed" fixedQ10="2.95288264"/>
            <timeCourse type="K_Pst_m_tau_tau"/>
            <steadyState type="HHSigmoidVariable" rate="1." midpoint="-11mV" scale="12mV"/>
        </gate>
        <gate id="h" instances="1" type="gateHHtauInf">
            <q10Settings type="q10Fixed" fixedQ10="2.95288264"/>
            <timeCourse type="K_Pst_h_tau_tau"/>
            <steadyState type="HHSigmoidVariable" rate="1." midpoint="-64mV" scale="-11mV"/>
        </gate>
    </ionChannel>
    <ionChannel id="Ca_LVAst" species="ca" type="ionChannelHH" conductance="10pS">
        <notes>Low voltage activated Ca2+ current

Comment from original mod file:
Note: mtau is an approximation from the plots
:Reference : :		Avery and Johnston 1996, tau from Randall 1997
:Comment: shifted by -10 mv to correct for junction potential
:Comment: corrected rates using q10 = 2.3, target temperature 34, orginal 21</notes>
        <gate id="m" instances="2" type="gateHHtauInf">
            <q10Settings type="q10Fixed" fixedQ10="2.95288264"/>
            <timeCourse type="Ca_LVAst_m_tau_tau"/>
            <steadyState type="HHSigmoidVariable" rate="1." midpoint="-40mV" scale="6mV"/>
        </gate>
        <gate id="h" instances="1" type="gateHHtauInf">
            <q10Settings type="q10Fixed" fixedQ10="2.95288264"/>
            <timeCourse type="Ca_LVAst_h_tau_tau"/>
            <steadyState type="HHSigmoidVariable" rate="1." midpoint="-90mV" scale="-6.4mV"/>
        </gate>
    </ionChannel>
    <expTwoSynapse id="synAmpa1" gbase="1nS" erev="0mV" tauDecay="5ms" tauRise="0.5ms"/>
    <expTwoSynapse id="synGaba1" gbase="2nS" erev="-80mV" tauDecay="20ms" tauRise="1ms"/>
    <cell id="HH_464198958">
        <notes>Cell model tuned to Allen Institute Cell Types Database, dataset: 464198958

Tuning procedure metadata:

{   'analysis_start_time': 0,
    'analysis_var': {   'baseline': 0,
                        'dvdt_threshold': 0,
                        'peak_delta': 0,
                        'peak_threshold': 0},
    'best_cand_analysis': {   'Pop0/0/RS/v:average_1000_1200': -89.79112000000488,
                              'Pop0/0/RS/v:average_last_1percent': -73.20288000000042,
                              'Pop0/0/RS/v:value_280': -83.34922,
                              'Pop0/1/RS/v:average_1000_1200': -77.72695000000081,
                              'Pop0/2/RS/v:average_1000_1200': -70.18682000000227,
                              'Pop0/3/RS/v:average_1000_1200': -65.66235999999451,
                              'Pop0/5/RS/v:mean_spike_frequency': 12.245352332183014,
                              'Pop0/6/RS/v:average_maximum': 50.853297380952391,
                              'Pop0/6/RS/v:average_minimum': -67.197317317073171,
                              'Pop0/6/RS/v:mean_spike_frequency': 42.639488326140082},
    'best_cand_analysis_full': {   'Pop0/0/RS/v:average_last_1percent': -73.20288000000042,
                                   'Pop0/0/RS/v:max_peak_no': 0,
                                   'Pop0/0/RS/v:maximum': -73.20288,
                                   'Pop0/0/RS/v:min_peak_no': 0,
                                   'Pop0/0/RS/v:minimum': -89.79112,
                                   'Pop0/1/RS/v:average_last_1percent': -73.20288000000042,
                                   'Pop0/1/RS/v:max_peak_no': 0,
                                   'Pop0/1/RS/v:maximum': -73.20288,
                                   'Pop0/1/RS/v:min_peak_no': 0,
                                   'Pop0/1/RS/v:minimum': -80.0,
                                   'Pop0/2/RS/v:average_last_1percent': -73.20288000000042,
                                   'Pop0/2/RS/v:max_peak_no': 0,
                                   'Pop0/2/RS/v:maximum': -70.18682,
                                   'Pop0/2/RS/v:min_peak_no': 0,
                                   'Pop0/2/RS/v:minimum': -80.0,
                                   'Pop0/3/RS/v:average_last_1percent': -73.20288000000042,
                                   'Pop0/3/RS/v:max_peak_no': 0,
                                   'Pop0/3/RS/v:maximum': -65.66236,
                                   'Pop0/3/RS/v:min_peak_no': 0,
                                   'Pop0/3/RS/v:minimum': -80.0,
                                   'Pop0/4/RS/v:average_last_1percent': -73.20288000000042,
                                   'Pop0/4/RS/v:max_peak_no': 0,
                                   'Pop0/4/RS/v:maximum': -59.60812,
                                   'Pop0/4/RS/v:min_peak_no': 0,
                                   'Pop0/4/RS/v:minimum': -80.0,
                                   'Pop0/5/RS/v:average_last_1percent': -73.20288000000042,
                                   'Pop0/5/RS/v:average_maximum': 50.839437500000003,
                                   'Pop0/5/RS/v:average_minimum': -67.663629999999998,
                                   'Pop0/5/RS/v:first_spike_time': 352.65000000000003,
                                   'Pop0/5/RS/v:interspike_time_covar': 0.00027268059031293181,
                                   'Pop0/5/RS/v:max_peak_no': 12,
                                   'Pop0/5/RS/v:maximum': 50.88155,
                                   'Pop0/5/RS/v:mean_spike_frequency': 12.245352332183014,
                                   'Pop0/5/RS/v:min_peak_no': 11,
                                   'Pop0/5/RS/v:minimum': -80.0,
                                   'Pop0/5/RS/v:peak_decay_exponent': -0.00055113288426214882,
                                   'Pop0/5/RS/v:peak_linear_gradient': -2.8116229767848377e-05,
                                   'Pop0/5/RS/v:spike_broadening': 1.0010097544180221,
                                   'Pop0/5/RS/v:spike_frequency_adaptation': -0.0035231766962091058,
                                   'Pop0/5/RS/v:spike_width_adaptation': 0.0013428219021934668,
                                   'Pop0/5/RS/v:trough_decay_exponent': 4.7322830937483194e-05,
                                   'Pop0/5/RS/v:trough_phase_adaptation': -0.0029717480755693157,
                                   'Pop0/6/RS/v:average_last_1percent': -73.20288000000042,
                                   'Pop0/6/RS/v:average_maximum': 50.853297380952391,
                                   'Pop0/6/RS/v:average_minimum': -67.197317317073171,
                                   'Pop0/6/RS/v:first_spike_time': 293.85,
                                   'Pop0/6/RS/v:interspike_time_covar': 0.000459246054095834,
                                   'Pop0/6/RS/v:max_peak_no': 42,
                                   'Pop0/6/RS/v:maximum': 50.91364,
                                   'Pop0/6/RS/v:mean_spike_frequency': 42.639488326140082,
                                   'Pop0/6/RS/v:min_peak_no': 41,
                                   'Pop0/6/RS/v:minimum': -80.0,
                                   'Pop0/6/RS/v:peak_decay_exponent': 0.00046780383795280158,
                                   'Pop0/6/RS/v:peak_linear_gradient': 2.6249789545570448e-06,
                                   'Pop0/6/RS/v:spike_broadening': 0.99985653499865612,
                                   'Pop0/6/RS/v:spike_frequency_adaptation': -0.0012247276314938922,
                                   'Pop0/6/RS/v:spike_width_adaptation': 0.00094218528657056264,
                                   'Pop0/6/RS/v:trough_decay_exponent': 1.7057569289972916e-06,
                                   'Pop0/6/RS/v:trough_phase_adaptation': 0.0021597830204685684},
    'comment': 'Ran 2000 evaluations (pop: 400) in 7957.622964 seconds (132.627049 mins)\n\n',
    'dt': 0.05,
    'fitness': 0.02116942459552551,
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</notes>
        <morphology id="morphology_RS">
            <segment id="0" name="Soma">
                <proximal x="0.000000e+00" y="0.000000e+00" z="0.000000e+00" diameter="1.000000e+01"/>
                <distal x="0.000000e+00" y="0.000000e+00" z="0.000000e+00" diameter="1.000000e+01"/>
            </segment>
            <segmentGroup neuroLexId="sao864921383" id="Soma">
                <member segment="0"/>
            </segmentGroup>
            <segmentGroup id="all">
                <include segmentGroup="Soma"/>
            </segmentGroup>
            <segmentGroup neuroLexId="GO:0043025" id="soma_group">
                <include segmentGroup="Soma"/>
            </segmentGroup>
        </morphology>
        <biophysicalProperties id="biophys">
            <membraneProperties>
                <channelDensity id="LeakConductance_all" ionChannel="LeakConductance" condDensity="0.084431083246 mS_per_cm2" erev="-73.202874868 mV" ion="non_specific"/>
                <channelDensity id="Na_all" ionChannel="Na" condDensity="100 mS_per_cm2" erev="51.9004594965 mV" ion="na"/>
                <channelDensity id="Kd_all" ionChannel="Kd" condDensity="5.26198284791 mS_per_cm2" erev="-86.4665007861 mV" ion="k"/>
                <channelDensity id="IM_all" ionChannel="IM" condDensity="1e-06 mS_per_cm2" erev="-75.6783687407 mV" ion="k"/>
                <spikeThresh value="0 mV"/>
                <specificCapacitance value="0.886055955696 uF_per_cm2"/>
                <initMembPotential value="-80.0 mV"/>
            </membraneProperties>
            <intracellularProperties>
                <resistivity value="100 ohm_cm"/>
            </intracellularProperties>
        </biophysicalProperties>
    </cell>
    <cell id="HH_471141261">
        <notes>Cell model tuned to Allen Institute Cell Types Database, dataset: 471141261

Tuning procedure metadata:

{   'analysis_start_time': 0,
    'analysis_var': {   'baseline': 0,
                        'dvdt_threshold': 0,
                        'peak_delta': 0,
                        'peak_threshold': 0},
    'best_cand_analysis': {   'Pop0/0/RS/v:average_1000_1200': -91.76206999999734,
                              'Pop0/0/RS/v:average_last_1percent': -77.80372430000001,
                              'Pop0/0/RS/v:value_280': -83.87403,
                              'Pop0/1/RS/v:average_1000_1200': -81.571203759063,
                              'Pop0/2/RS/v:average_1000_1200': -71.79696068232946,
                              'Pop0/3/RS/v:average_1000_1200': -63.10328015996003,
                              'Pop0/5/RS/v:mean_spike_frequency': 18.348623853211009,
                              'Pop0/6/RS/v:average_maximum': 35.525190434782616,
                              'Pop0/6/RS/v:average_minimum': -64.534417727272725,
                              'Pop0/6/RS/v:mean_spike_frequency': 23.005333054480811},
    'best_cand_analysis_full': {   'Pop0/0/RS/v:average_last_1percent': -77.80372430000001,
                                   'Pop0/0/RS/v:max_peak_no': 0,
                                   'Pop0/0/RS/v:maximum': -77.77968,
                                   'Pop0/0/RS/v:min_peak_no': 0,
                                   'Pop0/0/RS/v:minimum': -91.76207,
                                   'Pop0/1/RS/v:average_last_1percent': -77.8183604666667,
                                   'Pop0/1/RS/v:max_peak_no': 0,
                                   'Pop0/1/RS/v:maximum': -77.80704,
                                   'Pop0/1/RS/v:min_peak_no': 0,
                                   'Pop0/1/RS/v:minimum': -81.57818,
                                   'Pop0/2/RS/v:average_last_1percent': -77.85333196666666,
                                   'Pop0/2/RS/v:max_peak_no': 0,
                                   'Pop0/2/RS/v:maximum': -71.6554,
                                   'Pop0/2/RS/v:min_peak_no': 0,
                                   'Pop0/2/RS/v:minimum': -80.0,
                                   'Pop0/3/RS/v:average_last_1percent': -77.92340549999997,
                                   'Pop0/3/RS/v:max_peak_no': 0,
                                   'Pop0/3/RS/v:maximum': -62.00969,
                                   'Pop0/3/RS/v:min_peak_no': 0,
                                   'Pop0/3/RS/v:minimum': -80.0,
                                   'Pop0/4/RS/v:average_last_1percent': -78.02842066666668,
                                   'Pop0/4/RS/v:max_peak_no': 0,
                                   'Pop0/4/RS/v:maximum': -52.414339999999996,
                                   'Pop0/4/RS/v:min_peak_no': 0,
                                   'Pop0/4/RS/v:minimum': -80.0,
                                   'Pop0/5/RS/v:average_last_1percent': -78.1700254333332,
                                   'Pop0/5/RS/v:average_maximum': 35.615392499999999,
                                   'Pop0/5/RS/v:average_minimum': -64.760596666666672,
                                   'Pop0/5/RS/v:first_spike_time': 304.45,
                                   'Pop0/5/RS/v:interspike_time_covar': 0.32713165879180689,
                                   'Pop0/5/RS/v:max_peak_no': 4,
                                   'Pop0/5/RS/v:maximum': 35.962830000000004,
                                   'Pop0/5/RS/v:mean_spike_frequency': 18.348623853211009,
                                   'Pop0/5/RS/v:min_peak_no': 3,
                                   'Pop0/5/RS/v:minimum': -80.0,
                                   'Pop0/5/RS/v:peak_decay_exponent': -0.0075593792904693514,
                                   'Pop0/5/RS/v:peak_linear_gradient': -0.0037608682321980218,
                                   'Pop0/5/RS/v:spike_broadening': 1.0063597478192265,
                                   'Pop0/5/RS/v:spike_frequency_adaptation': -0.28687681228491091,
                                   'Pop0/5/RS/v:spike_width_adaptation': -0.094741841456579684,
                                   'Pop0/5/RS/v:trough_decay_exponent': -0.0015972011849719214,
                                   'Pop0/5/RS/v:trough_phase_adaptation': -0.209209463493228,
                                   'Pop0/6/RS/v:average_last_1percent': -78.351322,
                                   'Pop0/6/RS/v:average_maximum': 35.525190434782616,
                                   'Pop0/6/RS/v:average_minimum': -64.534417727272725,
                                   'Pop0/6/RS/v:first_spike_time': 291.9,
                                   'Pop0/6/RS/v:interspike_time_covar': 0.26900315913242834,
                                   'Pop0/6/RS/v:max_peak_no': 23,
                                   'Pop0/6/RS/v:maximum': 36.288059999999994,
                                   'Pop0/6/RS/v:mean_spike_frequency': 23.005333054480811,
                                   'Pop0/6/RS/v:min_peak_no': 22,
                                   'Pop0/6/RS/v:minimum': -80.0,
                                   'Pop0/6/RS/v:peak_decay_exponent': -0.0048776793307134247,
                                   'Pop0/6/RS/v:peak_linear_gradient': -0.00069224623544187735,
                                   'Pop0/6/RS/v:spike_broadening': 1.0129100696391822,
                                   'Pop0/6/RS/v:spike_frequency_adaptation': -0.013820737714605447,
                                   'Pop0/6/RS/v:spike_width_adaptation': -0.0061980597352344312,
                                   'Pop0/6/RS/v:trough_decay_exponent': -0.0027957376634720711,
                                   'Pop0/6/RS/v:trough_phase_adaptation': -0.0071578815518790403},
    'comment': 'Ran 2000 evaluations (pop: 400) in 7950.616514 seconds (132.510275 mins)\n\n',
    'dt': 0.05,
    'fitness': 0.00635605689175428,
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</notes>
        <morphology id="morphology_RS">
            <segment id="0" name="Soma">
                <proximal x="0.000000e+00" y="0.000000e+00" z="0.000000e+00" diameter="1.000000e+01"/>
                <distal x="0.000000e+00" y="0.000000e+00" z="0.000000e+00" diameter="1.000000e+01"/>
            </segment>
            <segmentGroup neuroLexId="sao864921383" id="Soma">
                <member segment="0"/>
            </segmentGroup>
            <segmentGroup id="all">
                <include segmentGroup="Soma"/>
            </segmentGroup>
            <segmentGroup neuroLexId="GO:0043025" id="soma_group">
                <include segmentGroup="Soma"/>
            </segmentGroup>
        </morphology>
        <biophysicalProperties id="biophys">
            <membraneProperties>
                <channelDensity id="LeakConductance_all" ionChannel="LeakConductance" condDensity="0.099 mS_per_cm2" erev="-77.654968235 mV" ion="non_specific"/>
                <channelDensity id="Na_all" ionChannel="Na" condDensity="30.801303241 mS_per_cm2" erev="54.3044354292 mV" ion="na"/>
                <channelDensity id="Kd_all" ionChannel="Kd" condDensity="15.4297478598 mS_per_cm2" erev="-78.017914887 mV" ion="k"/>
                <channelDensity id="IM_all" ionChannel="IM" condDensity="0.173638370978 mS_per_cm2" erev="-85.0830254209 mV" ion="k"/>
                <spikeThresh value="0 mV"/>
                <specificCapacitance value="1.74882047193 uF_per_cm2"/>
                <initMembPotential value="-80.0 mV"/>
            </membraneProperties>
            <intracellularProperties>
                <resistivity value="100 ohm_cm"/>
            </intracellularProperties>
        </biophysicalProperties>
    </cell>
    <cell id="cADpyr229_L23_PC_5ecbf9b163_0_0">
        <notes>

Export of a cell model obtained from the BBP Neocortical Microcircuit Collaboration Portal into NeuroML2

******************************************************
*  This export to NeuroML2 has not yet been fully validated!!
*  Use with caution!!
******************************************************

For more information on this cell model see: https://bbp.epfl.ch/nmc-portal/microcircuit#/metype/L23_PC_L23PC/details

</notes>
        <morphology id="morphology">
            <segment id="0" name="Seg0_soma_0">
                <proximal x="2.575320e-01" y="-8.049430e+00" z="0.000000e+00" diameter="3.028240e+00"/>
                <distal x="1.803480e-01" y="-7.222060e+00" z="0.000000e+00" diameter="5.309970e+00"/>
            </segment>
            <segment id="2" name="Seg1_soma_0">
                <parent segment="0"/>
                <distal x="1.031640e-01" y="-6.394700e+00" z="0.000000e+00" diameter="7.922740e+00"/>
            </segment>
            <segment id="3" name="Seg2_soma_0">
                <parent segment="2"/>
                <distal x="2.597970e-02" y="-5.567330e+00" z="0.000000e+00" diameter="9.353900e+00"/>
            </segment>
            <segment id="4" name="Seg3_soma_0">
                <parent segment="3"/>
                <distal x="-5.120450e-02" y="-4.739960e+00" z="0.000000e+00" diameter="1.078510e+01"/>
            </segment>
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            <segmentGroup neuroLexId="sao864921383" id="soma_0">
                <notes>This group contains an unbranched set of segments, and all of the segmentGroups marked with
             neuroLexId = sao864921383 form a non-overlapping set of all of the segments.
             These segmentGroups correspond to the 'cables' of NeuroML v1.8.1, and map to/from NEURON sections.</notes>
                <member segment="0"/>
                <member segment="2"/>
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            </segmentGroup>
            <segmentGroup neuroLexId="sao864921383" id="apic_0">
                <notes>This group contains an unbranched set of segments, and all of the segmentGroups marked with
             neuroLexId = sao864921383 form a non-overlapping set of all of the segments.
             These segmentGroups correspond to the 'cables' of NeuroML v1.8.1, and map to/from NEURON sections.</notes>
                <member segment="750"/>
                <member segment="751"/>
                <member segment="752"/>
                <member segment="753"/>
            </segmentGroup>
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            <segmentGroup id="basal">
                <include segmentGroup="dend_0"/>
                <include segmentGroup="dend_1"/>
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                <inhomogeneousParameter id="PathLengthOver_basal" variable="p" metric="Path Length from root">
                    <proximal translationStart="0.000000e+00"/>
                </inhomogeneousParameter>
            </segmentGroup>
            <segmentGroup id="apical">
                <include segmentGroup="apic_0"/>
                <include segmentGroup="apic_1"/>
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                <inhomogeneousParameter id="PathLengthOver_apical" variable="p" metric="Path Length from root">
                    <proximal translationStart="0.000000e+00"/>
                </inhomogeneousParameter>
            </segmentGroup>
            <segmentGroup id="axonal">
                <include segmentGroup="axon_0"/>
                <include segmentGroup="axon_1"/>
            </segmentGroup>
            <segmentGroup id="somatic">
                <include segmentGroup="soma_0"/>
            </segmentGroup>
        </morphology>
        <biophysicalProperties id="biophys">
            <membraneProperties>
                <channelDensity id="all_g_pas" ionChannel="pas" condDensity="3e-5 S_per_cm2" erev="-75 mV" ion="non_specific"/>
                <channelDensity id="basal_gIhbar_Ih" ionChannel="Ih" condDensity="8e-05 S_per_cm2" erev="-45.0 mV" segmentGroup="basal" ion="hcn"/>
                <channelDensity id="apical_gNaTs2_tbar_NaTs2_t" ionChannel="NaTs2_t" condDensity="0.012009 S_per_cm2" erev="50.0 mV" segmentGroup="apical" ion="na"/>
                <channelDensity id="apical_gSKv3_1bar_SKv3_1" ionChannel="SKv3_1" condDensity="0.000513 S_per_cm2" erev="-85.0 mV" segmentGroup="apical" ion="k"/>
                <channelDensity id="apical_gImbar_Im" ionChannel="Im" condDensity="0.00074 S_per_cm2" erev="-85.0 mV" segmentGroup="apical" ion="k"/>
                <channelDensity id="axonal_gNaTa_tbar_NaTa_t" ionChannel="NaTa_t" condDensity="3.429725 S_per_cm2" erev="50.0 mV" segmentGroup="axonal" ion="na"/>
                <channelDensity id="axonal_gK_Tstbar_K_Tst" ionChannel="K_Tst" condDensity="0.001035 S_per_cm2" erev="-85.0 mV" segmentGroup="axonal" ion="k"/>
                <channelDensity id="axonal_gNap_Et2bar_Nap_Et2" ionChannel="Nap_Et2" condDensity="0.009803 S_per_cm2" erev="50.0 mV" segmentGroup="axonal" ion="na"/>
                <channelDensity id="axonal_gSK_E2bar_SK_E2" ionChannel="SK_E2" condDensity="0.008085 S_per_cm2" erev="-85.0 mV" segmentGroup="axonal" ion="k"/>
                <channelDensity id="axonal_gK_Pstbar_K_Pst" ionChannel="K_Pst" condDensity="0.959296 S_per_cm2" erev="-85.0 mV" segmentGroup="axonal" ion="k"/>
                <channelDensity id="axonal_gSKv3_1bar_SKv3_1" ionChannel="SKv3_1" condDensity="0.094971 S_per_cm2" erev="-85.0 mV" segmentGroup="axonal" ion="k"/>
                <channelDensity id="somatic_gSKv3_1bar_SKv3_1" ionChannel="SKv3_1" condDensity="0.102517 S_per_cm2" erev="-85.0 mV" segmentGroup="somatic" ion="k"/>
                <channelDensity id="somatic_gSK_E2bar_SK_E2" ionChannel="SK_E2" condDensity="0.099433 S_per_cm2" erev="-85.0 mV" segmentGroup="somatic" ion="k"/>
                <channelDensity id="somatic_gNaTs2_tbar_NaTs2_t" ionChannel="NaTs2_t" condDensity="0.926705 S_per_cm2" erev="50.0 mV" segmentGroup="somatic" ion="na"/>
                <channelDensity id="somatic_gIhbar_Ih" ionChannel="Ih" condDensity="8e-05 S_per_cm2" erev="-45.0 mV" segmentGroup="somatic" ion="hcn"/>
                <channelDensityNernst id="axonal_gCa_HVAbar_Ca_HVA" ionChannel="Ca_HVA" condDensity="0.000306 S_per_cm2" segmentGroup="axonal" ion="ca"/>
                <channelDensityNernst id="axonal_gCa_LVAstbar_Ca_LVAst" ionChannel="Ca_LVAst" condDensity="5e-05 S_per_cm2" segmentGroup="axonal" ion="ca"/>
                <channelDensityNernst id="somatic_gCa_HVAbar_Ca_HVA" ionChannel="Ca_HVA" condDensity="0.000374 S_per_cm2" segmentGroup="somatic" ion="ca"/>
                <channelDensityNernst id="somatic_gCa_LVAstbar_Ca_LVAst" ionChannel="Ca_LVAst" condDensity="0.000778 S_per_cm2" segmentGroup="somatic" ion="ca"/>
                <channelDensityNonUniform id="apical_gIhbar_Ih" ionChannel="Ih" erev="-45.0 mV" ion="hcn">
                    <variableParameter parameter="condDensity" segmentGroup="apical">
                        <inhomogeneousValue inhomogeneousParameter="PathLengthOver_apical" value="1e4 * ((-0.869600 + 2.087000*exp((p-0.000000)*0.003100))*0.000080)"/>
                    </variableParameter>
                </channelDensityNonUniform>
                <specificCapacitance value="2 uF_per_cm2" segmentGroup="basal"/>
                <specificCapacitance value="2 uF_per_cm2" segmentGroup="apical"/>
                <specificCapacitance value="1.0 uF_per_cm2" segmentGroup="axonal"/>
                <specificCapacitance value="1.0 uF_per_cm2" segmentGroup="somatic"/>
                <initMembPotential value="-80 mV"/>
            </membraneProperties>
            <intracellularProperties>
                <species segmentGroup="axonal" id="ca" concentrationModel="CaDynamics_E2_NML2__cADpyr_229_axonal" ion="ca" initialConcentration="5.0E-11 mol_per_cm3" initialExtConcentration="2.0E-6 mol_per_cm3"/>
                <species segmentGroup="somatic" id="ca" concentrationModel="CaDynamics_E2_NML2__cADpyr_229_somatic" ion="ca" initialConcentration="5.0E-11 mol_per_cm3" initialExtConcentration="2.0E-6 mol_per_cm3"/>
                <resistivity value="100 ohm_cm"/>
            </intracellularProperties>
        </biophysicalProperties>
    </cell>
    <poissonFiringSynapse id="psf1" averageRate="150 Hz" synapse="synAmpa1" spikeTarget="./synAmpa1"/>
    <network id="Balanced">
        <population id="popExc" component="HH_464198958" size="16" type="populationList">
            <instance id="0">
                <location x="186.581414276999993" y="70.366299587699999" z="102.247441018000004"/>
            </instance>
            <instance id="1">
                <location x="164.390384979999993" y="319.634498682000014" z="274.668271918000016"/>
            </instance>
            <instance id="2">
                <location x="68.625392595199997" y="-108.030886581000004" z="329.944279838"/>
            </instance>
            <instance id="3">
                <location x="-105.276089854999995" y="-134.592989136999989" z="336.631815171000028"/>
            </instance>
            <instance id="4">
                <location x="-61.564413761200001" y="161.640737519999988" z="284.744708531000015"/>
            </instance>
            <instance id="5">
                <location x="-140.578144516999998" y="-58.454676294999999" z="134.323890906999992"/>
            </instance>
            <instance id="6">
                <location x="-194.152487804999993" y="93.375770302399999" z="389.470468274999973"/>
            </instance>
            <instance id="7">
                <location x="-174.175087609000002" y="120.544092775999999" z="239.769567701999989"/>
            </instance>
            <instance id="8">
                <location x="40.5853798244" y="-105.535585005000002" z="273.700805855999988"/>
            </instance>
            <instance id="9">
                <location x="-92.165798472199995" y="128.216280277999999" z="293.390270252999983"/>
            </instance>
            <instance id="10">
                <location x="-7.58545145339" y="27.6195737215" z="174.745636407999996"/>
            </instance>
            <instance id="11">
                <location x="173.406199216999994" y="76.694009738199995" z="259.048362073000021"/>
            </instance>
            <instance id="12">
                <location x="-192.280173475999987" y="104.050962889999994" z="101.734071224999994"/>
            </instance>
            <instance id="13">
                <location x="-142.492628961999998" y="86.413462673699996" z="213.20423223200001"/>
            </instance>
            <instance id="14">
                <location x="-178.329920541999996" y="143.764254066000007" z="149.200967122999998"/>
            </instance>
            <instance id="15">
                <location x="22.932094976599998" y="-77.877139198999998" z="381.192125409000028"/>
            </instance>
        </population>
        <population id="popInh" component="HH_471141261" size="8" type="populationList">
            <instance id="0">
                <location x="108.391988608000005" y="328.466561174999981" z="142.368329324999991"/>
            </instance>
            <instance id="1">
                <location x="-77.842916684900004" y="-130.205187886000004" z="183.035108438000009"/>
            </instance>
            <instance id="2">
                <location x="122.605002045999996" y="-61.328482360899997" z="146.371154412999999"/>
            </instance>
            <instance id="3">
                <location x="181.887462281000012" y="-72.724299955500001" z="350.166788245000021"/>
            </instance>
            <instance id="4">
                <location x="-183.574877490999995" y="43.091764167900003" z="204.877690588999997"/>
            </instance>
            <instance id="5">
                <location x="-63.3168828998" y="258.231528357000002" z="242.780472440000011"/>
            </instance>
            <instance id="6">
                <location x="113.156115808999999" y="85.420062654399999" z="345.203202056999999"/>
            </instance>
            <instance id="7">
                <location x="152.627039461999999" y="69.798198839799994" z="334.319079337999995"/>
            </instance>
        </population>
        <population id="popBBP" component="cADpyr229_L23_PC_5ecbf9b163_0_0" size="1" type="populationList">
            <instance id="0">
                <location x="0." y="0." z="200."/>
            </instance>
        </population>
        <projection id="proj0_popExc_popExc" presynapticPopulation="popExc" postsynapticPopulation="popExc" synapse="synAmpa1">
            <connectionWD id="0" preCellId="../popExc/0/HH_464198958" postCellId="../popExc/2/HH_464198958" weight="1." delay="0 ms"/>
            <connectionWD id="1" preCellId="../popExc/0/HH_464198958" postCellId="../popExc/3/HH_464198958" weight="1." delay="0 ms"/>
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        </projection>
        <projection id="proj1_popExc_popInh" presynapticPopulation="popExc" postsynapticPopulation="popInh" synapse="synAmpa1">
            <connectionWD id="0" preCellId="../popExc/0/HH_464198958" postCellId="../popInh/4/HH_471141261" weight="1." delay="0 ms"/>
            <connectionWD id="1" preCellId="../popExc/0/HH_464198958" postCellId="../popInh/5/HH_471141261" weight="1." delay="0 ms"/>
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        </projection>
        <projection id="proj3_popInh_popExc" presynapticPopulation="popInh" postsynapticPopulation="popExc" synapse="synGaba1">
            <connectionWD id="0" preCellId="../popInh/0/HH_471141261" postCellId="../popExc/1/HH_464198958" weight="1." delay="0 ms"/>
            <connectionWD id="1" preCellId="../popInh/0/HH_471141261" postCellId="../popExc/2/HH_464198958" weight="1." delay="0 ms"/>
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        </projection>
        <projection id="proj4_popInh_popInh" presynapticPopulation="popInh" postsynapticPopulation="popInh" synapse="synGaba1">
            <connectionWD id="0" preCellId="../popInh/0/HH_471141261" postCellId="../popInh/2/HH_471141261" weight="1." delay="0 ms"/>
            <connectionWD id="1" preCellId="../popInh/0/HH_471141261" postCellId="../popInh/4/HH_471141261" weight="1." delay="0 ms"/>
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        </projection>
        <projection id="proj5_popExc_popBBP" presynapticPopulation="popExc" postsynapticPopulation="popBBP" synapse="synAmpa1">
            <connectionWD id="0" preCellId="../popExc/0/HH_464198958" postCellId="../popBBP/0/cADpyr229_L23_PC_5ecbf9b163_0_0" weight="1." delay="0 ms"/>
            <connectionWD id="1" preCellId="../popExc/1/HH_464198958" postCellId="../popBBP/0/cADpyr229_L23_PC_5ecbf9b163_0_0" weight="1." delay="0 ms"/>
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        </projection>
        <inputList id="Stim0" population="popExc" component="psf1">
            <input id="0" target="../popExc/0/HH_464198958" destination="synapses"/>
            <input id="1" target="../popExc/1/HH_464198958" destination="synapses"/>
            <input id="2" target="../popExc/2/HH_464198958" destination="synapses"/>
            <input id="3" target="../popExc/3/HH_464198958" destination="synapses"/>
            <input id="4" target="../popExc/4/HH_464198958" destination="synapses"/>
            <input id="5" target="../popExc/5/HH_464198958" destination="synapses"/>
            <input id="6" target="../popExc/6/HH_464198958" destination="synapses"/>
            <input id="7" target="../popExc/7/HH_464198958" destination="synapses"/>
            <input id="8" target="../popExc/8/HH_464198958" destination="synapses"/>
            <input id="9" target="../popExc/9/HH_464198958" destination="synapses"/>
            <input id="10" target="../popExc/10/HH_464198958" destination="synapses"/>
            <input id="11" target="../popExc/11/HH_464198958" destination="synapses"/>
            <input id="12" target="../popExc/12/HH_464198958" destination="synapses"/>
            <input id="13" target="../popExc/13/HH_464198958" destination="synapses"/>
            <input id="14" target="../popExc/14/HH_464198958" destination="synapses"/>
            <input id="15" target="../popExc/15/HH_464198958" destination="synapses"/>
        </inputList>
    </network>
    <ComponentType name="IM_p_tau_tau" extends="baseVoltageDepTime">
        <Constant name="TIME_SCALE" dimension="time" value="1 ms"/>
        <Constant name="VOLT_SCALE" dimension="voltage" value="1 mV"/>
        <Constant name="tmax" dimension="none" value="1000"/>
        <Dynamics>
            <DerivedVariable name="V" dimension="none" value="v / VOLT_SCALE"/>
            <DerivedVariable name="t" dimension="time" value="(tmax / ( (3.3 * (exp ((V+35)/20))) + (exp (-1 * (V+35) /20)))) * TIME_SCALE" exposure="t"/>
        </Dynamics>
    </ComponentType>
    <ComponentType name="IM_p_inf_inf" extends="baseVoltageDepVariable">
        <Constant name="TIME_SCALE" dimension="time" value="1 ms"/>
        <Constant name="VOLT_SCALE" dimension="voltage" value="1 mV"/>
        <Dynamics>
            <DerivedVariable name="V" dimension="none" value="v / VOLT_SCALE"/>
            <ConditionalDerivedVariable name="x" dimension="none" exposure="x">
                <Case condition="v .eq. -1000.070" value="0"/>
                <Case value="1/(1+ (exp (-1 * (V+35)/10)))"/>
            </ConditionalDerivedVariable>
        </Dynamics>
    </ComponentType>
    <ComponentType name="Kd_n_alpha_rate" extends="baseVoltageDepRate">
        <Constant name="TIME_SCALE" dimension="time" value="1 ms"/>
        <Constant name="VOLT_SCALE" dimension="voltage" value="1 mV"/>
        <Constant name="VT" dimension="none" value="-55"/>
        <Dynamics>
            <DerivedVariable name="V" dimension="none" value="v / VOLT_SCALE"/>
            <ConditionalDerivedVariable name="r" dimension="per_time" exposure="r">
                <Case condition="(V - VT) - 15 .neq. 0" value="(-0.032 * ( (V - VT) - 15 ) / ( (exp (-1*( (V - VT) - 15 ) / 5)) - 1)) / TIME_SCALE"/>
                <Case value="(0.032 * 5) / TIME_SCALE"/>
            </ConditionalDerivedVariable>
        </Dynamics>
    </ComponentType>
    <ComponentType name="Kd_n_beta_rate" extends="baseVoltageDepRate">
        <Constant name="TIME_SCALE" dimension="time" value="1 ms"/>
        <Constant name="VOLT_SCALE" dimension="voltage" value="1 mV"/>
        <Constant name="VT" dimension="none" value="-55"/>
        <Dynamics>
            <DerivedVariable name="V" dimension="none" value="v / VOLT_SCALE"/>
            <DerivedVariable name="r" dimension="per_time" value="(0.5 * (exp (-1*( (V - VT) - 10 ) / 40))) / TIME_SCALE" exposure="r"/>
        </Dynamics>
    </ComponentType>
    <ComponentType name="Na_m_alpha_rate" extends="baseVoltageDepRate">
        <Constant name="TIME_SCALE" dimension="time" value="1 ms"/>
        <Constant name="VOLT_SCALE" dimension="voltage" value="1 mV"/>
        <Constant name="VT" dimension="none" value="-55"/>
        <Dynamics>
            <DerivedVariable name="V" dimension="none" value="v / VOLT_SCALE"/>
            <DerivedVariable name="r" dimension="per_time" value="(-0.32 * ( (V - VT) - 13 ) / ( (exp (-1*( (V - VT) - 13 ) / 4)) - 1)) / TIME_SCALE" exposure="r"/>
        </Dynamics>
    </ComponentType>
    <ComponentType name="Na_m_beta_rate" extends="baseVoltageDepRate">
        <Constant name="TIME_SCALE" dimension="time" value="1 ms"/>
        <Constant name="VOLT_SCALE" dimension="voltage" value="1 mV"/>
        <Constant name="VT" dimension="none" value="-55"/>
        <Dynamics>
            <DerivedVariable name="V" dimension="none" value="v / VOLT_SCALE"/>
            <DerivedVariable name="r" dimension="per_time" value="(0.28 * ( (V - VT) - 40 ) / ((exp (( (V - VT) - 40 ) / 5)) - 1)) / TIME_SCALE" exposure="r"/>
        </Dynamics>
    </ComponentType>
    <ComponentType name="Na_h_alpha_rate" extends="baseVoltageDepRate">
        <Constant name="TIME_SCALE" dimension="time" value="1 ms"/>
        <Constant name="VOLT_SCALE" dimension="voltage" value="1 mV"/>
        <Constant name="VT" dimension="none" value="-55"/>
        <Dynamics>
            <DerivedVariable name="V" dimension="none" value="v / VOLT_SCALE"/>
            <DerivedVariable name="r" dimension="per_time" value="(0.128 * (exp (-1*( (V - VT) - 17 ) / 18))) / TIME_SCALE" exposure="r"/>
        </Dynamics>
    </ComponentType>
    <ComponentType name="Na_h_beta_rate" extends="baseVoltageDepRate">
        <Constant name="TIME_SCALE" dimension="time" value="1 ms"/>
        <Constant name="VOLT_SCALE" dimension="voltage" value="1 mV"/>
        <Constant name="VT" dimension="none" value="-55"/>
        <Dynamics>
            <DerivedVariable name="V" dimension="none" value="v / VOLT_SCALE"/>
            <DerivedVariable name="r" dimension="per_time" value="(4 / ( 1 + (exp (-1*( (V - VT) - 40 ) / 5)))) / TIME_SCALE" exposure="r"/>
        </Dynamics>
    </ComponentType>
    <ComponentType name="SKv3_1_m_tau_tau" extends="baseVoltageDepTime">
        <Constant name="TIME_SCALE" dimension="time" value="1 ms"/>
        <Constant name="VOLT_SCALE" dimension="voltage" value="1 mV"/>
        <Dynamics>
            <DerivedVariable name="V" dimension="none" value="v / VOLT_SCALE"/>
            <DerivedVariable name="t" dimension="time" value="(4/(1 + exp( (V+46.56) / (-44.140) ))) * TIME_SCALE" exposure="t"/>
        </Dynamics>
    </ComponentType>
    <ComponentType name="K_Tst_m_tau_tau" extends="baseVoltageDepTime">
        <Constant name="TIME_SCALE" dimension="time" value="1 ms"/>
        <Constant name="VOLT_SCALE" dimension="voltage" value="1 mV"/>
        <Dynamics>
            <DerivedVariable name="V" dimension="none" value="v / VOLT_SCALE"/>
            <DerivedVariable name="t" dimension="time" value="(0.34 + 0.92 * (exp (-1 *((V+81)/59)^2))) * TIME_SCALE" exposure="t"/>
        </Dynamics>
    </ComponentType>
    <ComponentType name="K_Tst_h_tau_tau" extends="baseVoltageDepTime">
        <Constant name="TIME_SCALE" dimension="time" value="1 ms"/>
        <Constant name="VOLT_SCALE" dimension="voltage" value="1 mV"/>
        <Dynamics>
            <DerivedVariable name="V" dimension="none" value="v / VOLT_SCALE"/>
            <DerivedVariable name="t" dimension="time" value="(8 + 49 * (exp (-1 * ((V+83)/23)^2))) * TIME_SCALE" exposure="t"/>
        </Dynamics>
    </ComponentType>
    <ComponentType name="Nap_Et2_m_tau_tau" extends="baseVoltageDepTime">
        <Constant name="TIME_SCALE" dimension="time" value="1 ms"/>
        <Constant name="VOLT_SCALE" dimension="voltage" value="1 mV"/>
        <Requirement name="alpha" dimension="per_time"/>
        <Requirement name="beta" dimension="per_time"/>
        <Dynamics>
            <DerivedVariable name="V" dimension="none" value="v / VOLT_SCALE"/>
            <DerivedVariable name="ALPHA" dimension="none" value="alpha * TIME_SCALE"/>
            <DerivedVariable name="BETA" dimension="none" value="beta * TIME_SCALE"/>
            <ConditionalDerivedVariable name="t" dimension="time" exposure="t">
                <Case condition="(ALPHA + BETA) .eq. 0" value="( 0 ) * TIME_SCALE"/>
                <Case condition="(ALPHA + BETA)  .gt. ( 0 )" value="( 6/( (ALPHA + BETA) ) ) * TIME_SCALE"/>
                <Case value="( 0) * TIME_SCALE"/>
            </ConditionalDerivedVariable>
        </Dynamics>
    </ComponentType>
    <ComponentType name="SK_E2_z_tau_tau" extends="baseVoltageConcDepTime">
        <Constant name="TIME_SCALE" dimension="time" value="1 ms"/>
        <Constant name="VOLT_SCALE" dimension="voltage" value="1 mV"/>
        <Constant name="CONC_SCALE" dimension="concentration" value="1 mol_per_cm3"/>
        <Dynamics>
            <DerivedVariable name="V" dimension="none" value="v / VOLT_SCALE"/>
            <DerivedVariable name="ca_conc" dimension="none" value="caConc / CONC_SCALE"/>
            <DerivedVariable name="t" dimension="time" value="(1) * TIME_SCALE" exposure="t"/>
        </Dynamics>
    </ComponentType>
    <ComponentType name="SK_E2_z_inf_inf" extends="baseVoltageConcDepVariable">
        <Constant name="TIME_SCALE" dimension="time" value="1 ms"/>
        <Constant name="VOLT_SCALE" dimension="voltage" value="1 mV"/>
        <Constant name="CONC_SCALE" dimension="concentration" value="1 mol_per_cm3"/>
        <Dynamics>
            <DerivedVariable name="V" dimension="none" value="v / VOLT_SCALE"/>
            <DerivedVariable name="ca_conc" dimension="none" value="caConc / CONC_SCALE"/>
            <DerivedVariable name="x" dimension="none" value="1/(1+(4.3e-10/ca_conc)^4.8)" exposure="x"/>
        </Dynamics>
    </ComponentType>
    <ComponentType name="K_Pst_m_tau_tau" extends="baseVoltageDepTime">
        <Constant name="TIME_SCALE" dimension="time" value="1 ms"/>
        <Constant name="VOLT_SCALE" dimension="voltage" value="1 mV"/>
        <Dynamics>
            <DerivedVariable name="V" dimension="none" value="v / VOLT_SCALE"/>
            <ConditionalDerivedVariable name="t" dimension="time" exposure="t">
                <Case condition="V  .lt. ( -60 )" value="( (1.25 + 175.03 * (exp ((V+10) * 0.026))) ) * TIME_SCALE"/>
                <Case value="( (1.25 + 13 * (exp ((V+10) * -0.026)))) * TIME_SCALE"/>
            </ConditionalDerivedVariable>
        </Dynamics>
    </ComponentType>
    <ComponentType name="K_Pst_h_tau_tau" extends="baseVoltageDepTime">
        <Constant name="TIME_SCALE" dimension="time" value="1 ms"/>
        <Constant name="VOLT_SCALE" dimension="voltage" value="1 mV"/>
        <Dynamics>
            <DerivedVariable name="V" dimension="none" value="v / VOLT_SCALE"/>
            <DerivedVariable name="t" dimension="time" value="(360 + (1010 + 24*(V+65)) * (exp (-1 *((V+85)/48)*((V+85)/48)))) * TIME_SCALE" exposure="t"/>
        </Dynamics>
    </ComponentType>

    <ComponentType name="Ca_LVAst_m_tau_tau" extends="baseVoltageDepTime">
        <Constant name="TIME_SCALE" dimension="time" value="1 ms"/>
        <Constant name="VOLT_SCALE" dimension="voltage" value="1 mV"/>
        <Dynamics>
            <DerivedVariable name="V" dimension="none" value="v / VOLT_SCALE"/>
            <DerivedVariable name="t" dimension="time" value="(5 + 20 / (1 + (exp ((V+35)/5) ))) * TIME_SCALE" exposure="t"/>
        </Dynamics>
    </ComponentType>
    <ComponentType name="Ca_LVAst_h_tau_tau" extends="baseVoltageDepTime">
        <Constant name="TIME_SCALE" dimension="time" value="1 ms"/>
        <Constant name="VOLT_SCALE" dimension="voltage" value="1 mV"/>
        <Dynamics>
            <DerivedVariable name="V" dimension="none" value="v / VOLT_SCALE"/>
            <DerivedVariable name="t" dimension="time" value="(20 + 50 / (1 + (exp ((V+50)/7) ))) * TIME_SCALE" exposure="t"/>
        </Dynamics>
    </ComponentType>
</neuroml>
