<neuroml xmlns="http://www.neuroml.org/schema/neuroml2"  xmlns:xs="http://www.w3.org/2001/XMLSchema" xmlns:xsi="http://www.w3.org/2001/XMLSchema-instance" xsi:schemaLocation="http://www.neuroml.org/schema/neuroml2 https://raw.github.com/NeuroML/NeuroML2/development/Schemas/NeuroML2/NeuroML_v2beta5.xsd" id="Balanced_240cells_29299conns">
    <notes>

This NeuroML 2 file was generated by OpenCortex v0.1.0 using:
    libNeuroML v0.2.29
    pyNeuroML v0.2.10

    </notes>
    <property tag="Network seed" value="1234"/>
    <include href="Balanced/HH_464198958.cell.nml"></include>
    <include href="Balanced/IM.channel.nml"></include>
    <include href="Balanced/Kd.channel.nml"></include>
    <include href="Balanced/Leak.channel.nml"></include>
    <include href="Balanced/Na.channel.nml"></include>
    <include href="Balanced/HH_471141261.cell.nml"></include>
    <include href="Balanced/IM.channel.nml"></include>
    <include href="Balanced/Kd.channel.nml"></include>
    <include href="Balanced/Leak.channel.nml"></include>
    <include href="Balanced/Na.channel.nml"></include>
    <expTwoSynapse id="synAmpa1" gbase="1nS" erev="0mV" tauDecay="5ms" tauRise="0.5ms"/>
    <expTwoSynapse id="synGaba1" gbase="2nS" erev="-80mV" tauDecay="20ms" tauRise="1ms"/>
    <poissonFiringSynapse id="psf1" averageRate="150 Hz" synapse="synAmpa1" spikeTarget="./synAmpa1"/>
    <network id="Balanced_240cells_29299conns" type="networkWithTemperature" temperature="32degC">
        <population id="popExc" component="HH_464198958" size="160" type="populationList">
            <instance id="0">
                <location x="573.162828554000043" y="70.366299587699999" z="104.494882035000003"/>
            </instance>
            <instance id="1">
                <location x="528.780769959000054" y="319.634498682000014" z="449.336543834999986"/>
            </instance>
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        </population>
        <population id="popInh" component="HH_471141261" size="80" type="populationList">
            <instance id="0">
                <location x="90.536807874800004" y="70.133886621900004" z="509.499358072000007"/>
            </instance>
            <instance id="1">
                <location x="-191.143540058000013" y="61.1748363703" z="353.032255164999981"/>
            </instance>
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        </population>
        <projection id="proj0_popExc_popExc" presynapticPopulation="popExc" postsynapticPopulation="popExc" synapse="synAmpa1">
            <connectionWD id="0" preCellId="../popExc/0/HH_464198958" postCellId="../popExc/8/HH_464198958" weight="1." delay="0 ms"/>
            <connectionWD id="1" preCellId="../popExc/0/HH_464198958" postCellId="../popExc/12/HH_464198958" weight="1." delay="0 ms"/>
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        </projection>
        <projection id="proj1_popExc_popInh" presynapticPopulation="popExc" postsynapticPopulation="popInh" synapse="synAmpa1">
            <connectionWD id="0" preCellId="../popExc/0/HH_464198958" postCellId="../popInh/0/HH_471141261" weight="1." delay="0 ms"/>
            <connectionWD id="1" preCellId="../popExc/0/HH_464198958" postCellId="../popInh/5/HH_471141261" weight="1." delay="0 ms"/>
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        </projection>
        <projection id="proj3_popInh_popExc" presynapticPopulation="popInh" postsynapticPopulation="popExc" synapse="synGaba1">
            <connectionWD id="0" preCellId="../popInh/0/HH_471141261" postCellId="../popExc/0/HH_464198958" weight="1." delay="0 ms"/>
            <connectionWD id="1" preCellId="../popInh/0/HH_471141261" postCellId="../popExc/1/HH_464198958" weight="1." delay="0 ms"/>
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        </projection>
        <projection id="proj4_popInh_popInh" presynapticPopulation="popInh" postsynapticPopulation="popInh" synapse="synGaba1">
            <connectionWD id="0" preCellId="../popInh/0/HH_471141261" postCellId="../popInh/1/HH_471141261" weight="1." delay="0 ms"/>
            <connectionWD id="1" preCellId="../popInh/0/HH_471141261" postCellId="../popInh/4/HH_471141261" weight="1." delay="0 ms"/>
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        </projection>
        <inputList id="Stim0" population="popExc" component="psf1">
            <input id="0" target="../popExc/0/HH_464198958" destination="synapses" segmentId="0" fractionAlong="0.5"/>
            <input id="1" target="../popExc/1/HH_464198958" destination="synapses" segmentId="0" fractionAlong="0.5"/>
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        </inputList>
    </network>
</neuroml>
