<neuroml xmlns="http://www.neuroml.org/schema/neuroml2"  xmlns:xs="http://www.w3.org/2001/XMLSchema" xmlns:xsi="http://www.w3.org/2001/XMLSchema-instance" xsi:schemaLocation="http://www.neuroml.org/schema/neuroml2 https://raw.github.com/NeuroML/NeuroML2/development/Schemas/NeuroML2/NeuroML_v2beta5.xsd" id="Balanced_246cells_26593conns">
    <notes>

This NeuroML 2 file was generated by OpenCortex v0.0.6 using:
    libNeuroML v0.2.20
    pyNeuroML v0.2.0

    </notes>
    <property tag="Python random seed" value="1234"/>
    <include href="Balanced/HH_464198958.cell.nml"></include>
    <include href="Balanced/IM.channel.nml"></include>
    <include href="Balanced/Kd.channel.nml"></include>
    <include href="Balanced/Leak.channel.nml"></include>
    <include href="Balanced/Na.channel.nml"></include>
    <include href="Balanced/HH_471141261.cell.nml"></include>
    <include href="Balanced/IM.channel.nml"></include>
    <include href="Balanced/Kd.channel.nml"></include>
    <include href="Balanced/Leak.channel.nml"></include>
    <include href="Balanced/Na.channel.nml"></include>
    <include href="Balanced/cADpyr229_L23_PC_5ecbf9b163_0_0.cell.nml"></include>
    <include href="Balanced/pas.channel.nml"></include>
    <include href="Balanced/Ih.channel.nml"></include>
    <include href="Balanced/NaTs2_t.channel.nml"></include>
    <include href="Balanced/SKv3_1.channel.nml"></include>
    <include href="Balanced/Im.channel.nml"></include>
    <include href="Balanced/NaTa_t.channel.nml"></include>
    <include href="Balanced/K_Tst.channel.nml"></include>
    <include href="Balanced/Nap_Et2.channel.nml"></include>
    <include href="Balanced/SK_E2.channel.nml"></include>
    <include href="Balanced/Ca_HVA.channel.nml"></include>
    <include href="Balanced/K_Pst.channel.nml"></include>
    <include href="Balanced/CaDynamics_E2_NML2.nml"></include>
    <include href="Balanced/Ca_LVAst.channel.nml"></include>
    <expTwoSynapse id="synAmpa1" gbase="1nS" erev="0mV" tauDecay="5ms" tauRise="0.5ms"/>
    <expTwoSynapse id="synGaba1" gbase="2nS" erev="-80mV" tauDecay="20ms" tauRise="1ms"/>
    <poissonFiringSynapse id="psf1" averageRate="150 Hz" synapse="synAmpa1" spikeTarget="./synAmpa1"/>
    <network id="Balanced_246cells_26593conns" type="networkWithTemperature" temperature="32degC">
        <population id="popExc" component="HH_464198958" size="160" type="populationList">
            <instance id="0">
                <location x="573.162828554000043" y="70.366299587699999" z="104.494882035000003"/>
            </instance>
            <instance id="1">
                <location x="528.780769959000054" y="319.634498682000014" z="449.336543834999986"/>
            </instance>
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        </population>
        <population id="popInh" component="HH_471141261" size="80" type="populationList">
            <instance id="0">
                <location x="90.536807874800004" y="70.133886621900004" z="509.499358072000007"/>
            </instance>
            <instance id="1">
                <location x="-191.143540058000013" y="61.1748363703" z="353.032255164999981"/>
            </instance>
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        </population>
        <population id="popBBP" component="cADpyr229_L23_PC_5ecbf9b163_0_0" size="6" type="populationList">
            <instance id="0">
                <location x="153.603904776000007" y="6.88902099208" z="497.547878878999995"/>
            </instance>
            <instance id="1">
                <location x="300.320599947000005" y="255.215170852" z="532.223788604999982"/>
            </instance>
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        </population>
        <projection id="proj0_popExc_popExc" presynapticPopulation="popExc" postsynapticPopulation="popExc" synapse="synAmpa1">
            <connectionWD id="0" preCellId="../popExc/0/HH_464198958" postCellId="../popExc/1/HH_464198958" weight="1." delay="0 ms"/>
            <connectionWD id="1" preCellId="../popExc/0/HH_464198958" postCellId="../popExc/2/HH_464198958" weight="1." delay="0 ms"/>
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        </projection>
        <projection id="proj1_popExc_popInh" presynapticPopulation="popExc" postsynapticPopulation="popInh" synapse="synAmpa1">
            <connectionWD id="0" preCellId="../popExc/0/HH_464198958" postCellId="../popInh/1/HH_471141261" weight="1." delay="0 ms"/>
            <connectionWD id="1" preCellId="../popExc/0/HH_464198958" postCellId="../popInh/2/HH_471141261" weight="1." delay="0 ms"/>
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        </projection>
        <projection id="proj3_popInh_popExc" presynapticPopulation="popInh" postsynapticPopulation="popExc" synapse="synGaba1">
            <connectionWD id="0" preCellId="../popInh/0/HH_471141261" postCellId="../popExc/0/HH_464198958" weight="1." delay="0 ms"/>
            <connectionWD id="1" preCellId="../popInh/0/HH_471141261" postCellId="../popExc/2/HH_464198958" weight="1." delay="0 ms"/>
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        </projection>
        <projection id="proj4_popInh_popInh" presynapticPopulation="popInh" postsynapticPopulation="popInh" synapse="synGaba1">
            <connectionWD id="0" preCellId="../popInh/0/HH_471141261" postCellId="../popInh/2/HH_471141261" weight="1." delay="0 ms"/>
            <connectionWD id="1" preCellId="../popInh/0/HH_471141261" postCellId="../popInh/5/HH_471141261" weight="1." delay="0 ms"/>
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        </projection>
        <projection id="proj5_popExc_popBBP" presynapticPopulation="popExc" postsynapticPopulation="popBBP" synapse="synAmpa1">
            <connectionWD id="0" preCellId="../popExc/0/HH_464198958" postCellId="../popBBP/0/cADpyr229_L23_PC_5ecbf9b163_0_0" weight="1." delay="0 ms"/>
            <connectionWD id="1" preCellId="../popExc/0/HH_464198958" postCellId="../popBBP/1/cADpyr229_L23_PC_5ecbf9b163_0_0" weight="1." delay="0 ms"/>
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        </projection>
        <inputList id="Stim0" population="popExc" component="psf1">
            <input id="0" target="../popExc/0/HH_464198958" destination="synapses"/>
            <input id="1" target="../popExc/1/HH_464198958" destination="synapses"/>
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        </inputList>
    </network>
</neuroml>
