<neuroml xmlns="http://www.neuroml.org/schema/neuroml2"  xmlns:xs="http://www.w3.org/2001/XMLSchema" xmlns:xsi="http://www.w3.org/2001/XMLSchema-instance" xsi:schemaLocation="http://www.neuroml.org/schema/neuroml2 https://raw.github.com/NeuroML/NeuroML2/development/Schemas/NeuroML2/NeuroML_v2beta5.xsd" id="Balanced_24cells_336conns">
    <notes>

This NeuroML 2 file was generated by OpenCortex v0.1.1 using:
    libNeuroML v0.2.32
    pyNeuroML v0.2.13

    </notes>
    <property tag="Network seed" value="1234"/>
    <include href="Balanced/HH_477127614.cell.nml"></include>
    <include href="Balanced/IMchan.channel.nml"></include>
    <include href="Balanced/Kd.channel.nml"></include>
    <include href="Balanced/Leak.channel.nml"></include>
    <include href="Balanced/Na.channel.nml"></include>
    <include href="Balanced/HH_476686112.cell.nml"></include>
    <include href="Balanced/IMchan.channel.nml"></include>
    <include href="Balanced/Kd.channel.nml"></include>
    <include href="Balanced/Leak.channel.nml"></include>
    <include href="Balanced/Na.channel.nml"></include>
    <expTwoSynapse id="synAmpa1" gbase="1nS" erev="0mV" tauDecay="5ms" tauRise="0.5ms"/>
    <expTwoSynapse id="synGaba1" gbase="2nS" erev="-80mV" tauDecay="20ms" tauRise="1ms"/>
    <poissonFiringSynapse id="psf1" averageRate="250 Hz" synapse="synAmpa1" spikeTarget="./synAmpa1"/>
    <network id="Balanced_24cells_336conns" type="networkWithTemperature" temperature="32degC">
        <population id="popExc" component="HH_477127614" size="16" type="populationList">
            <instance id="0">
                <location x="573.162828554000043" y="70.366299587699999" z="104.494882035000003"/>
            </instance>
            <instance id="1">
                <location x="528.780769959000054" y="319.634498682000014" z="449.336543834999986"/>
            </instance>
            <instance id="2">
                <location x="337.250785189999988" y="-108.030886581000004" z="559.88855967500001"/>
            </instance>
            <instance id="3">
                <location x="-10.552179709500001" y="-134.592989136999989" z="573.263630342000056"/>
            </instance>
            <instance id="4">
                <location x="76.8711724777" y="161.640737519999988" z="469.489417061999973"/>
            </instance>
            <instance id="5">
                <location x="-81.1562890334" y="-58.454676294999999" z="168.647781812999995"/>
            </instance>
            <instance id="6">
                <location x="-188.304975610000014" y="93.375770302399999" z="678.940936549999947"/>
            </instance>
            <instance id="7">
                <location x="-148.350175218000004" y="120.544092775999999" z="379.539135405000025"/>
            </instance>
            <instance id="8">
                <location x="281.17075964899999" y="-105.535585005000002" z="447.401611711999976"/>
            </instance>
            <instance id="9">
                <location x="15.668403055600001" y="128.216280277999999" z="486.780540507000012"/>
            </instance>
            <instance id="10">
                <location x="184.829097093000001" y="27.6195737215" z="249.491272817000009"/>
            </instance>
            <instance id="11">
                <location x="546.812398433999988" y="76.694009738199995" z="418.096724146999975"/>
            </instance>
            <instance id="12">
                <location x="-184.560346952000003" y="104.050962889999994" z="103.468142451000006"/>
            </instance>
            <instance id="13">
                <location x="-84.985257923500001" y="86.413462673699996" z="326.408464464000019"/>
            </instance>
            <instance id="14">
                <location x="-156.659841083000003" y="143.764254066000007" z="198.401934245000007"/>
            </instance>
            <instance id="15">
                <location x="245.864189952999993" y="-77.877139198999998" z="662.384250818000055"/>
            </instance>
        </population>
        <population id="popInh" component="HH_476686112" size="8" type="populationList">
            <instance id="0">
                <location x="416.783977215999982" y="328.466561174999981" z="184.73665865000001"/>
            </instance>
            <instance id="1">
                <location x="44.314166630199999" y="-130.205187886000004" z="266.070216875000028"/>
            </instance>
            <instance id="2">
                <location x="445.21000409200002" y="-61.328482360899997" z="192.742308825999999"/>
            </instance>
            <instance id="3">
                <location x="563.774924562000024" y="-72.724299955500001" z="600.333576491000031"/>
            </instance>
            <instance id="4">
                <location x="-167.149754983000008" y="43.091764167900003" z="309.755381177999993"/>
            </instance>
            <instance id="5">
                <location x="73.366234200400001" y="258.231528357000002" z="385.560944878999976"/>
            </instance>
            <instance id="6">
                <location x="426.312231617999998" y="85.420062654399999" z="590.406404114999987"/>
            </instance>
            <instance id="7">
                <location x="505.254078923999998" y="69.798198839799994" z="568.638158675"/>
            </instance>
        </population>
        <projection id="proj0_popExc_popExc" presynapticPopulation="popExc" postsynapticPopulation="popExc" synapse="synAmpa1">
            <connectionWD id="0" preCellId="../popExc/0/HH_477127614" postCellId="../popExc/2/HH_477127614" weight="1." delay="2 ms"/>
            <connectionWD id="1" preCellId="../popExc/0/HH_477127614" postCellId="../popExc/3/HH_477127614" weight="1." delay="2 ms"/>
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        </projection>
        <projection id="proj1_popExc_popInh" presynapticPopulation="popExc" postsynapticPopulation="popInh" synapse="synAmpa1">
            <connectionWD id="0" preCellId="../popExc/0/HH_477127614" postCellId="../popInh/1/HH_476686112" weight="1." delay="2 ms"/>
            <connectionWD id="1" preCellId="../popExc/0/HH_477127614" postCellId="../popInh/2/HH_476686112" weight="1." delay="2 ms"/>
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        </projection>
        <projection id="proj3_popInh_popExc" presynapticPopulation="popInh" postsynapticPopulation="popExc" synapse="synGaba1">
            <connectionWD id="0" preCellId="../popInh/0/HH_476686112" postCellId="../popExc/1/HH_477127614" weight="1." delay="2 ms"/>
            <connectionWD id="1" preCellId="../popInh/0/HH_476686112" postCellId="../popExc/2/HH_477127614" weight="1." delay="2 ms"/>
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        </projection>
        <projection id="proj4_popInh_popInh" presynapticPopulation="popInh" postsynapticPopulation="popInh" synapse="synGaba1">
            <connectionWD id="0" preCellId="../popInh/0/HH_476686112" postCellId="../popInh/2/HH_476686112" weight="1." delay="2 ms"/>
            <connectionWD id="1" preCellId="../popInh/0/HH_476686112" postCellId="../popInh/4/HH_476686112" weight="1." delay="2 ms"/>
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        </projection>
        <inputList id="Stim0" population="popExc" component="psf1">
            <input id="0" target="../popExc/0/HH_477127614" destination="synapses" segmentId="0" fractionAlong="0.5"/>
            <input id="1" target="../popExc/1/HH_477127614" destination="synapses" segmentId="0" fractionAlong="0.5"/>
            <input id="2" target="../popExc/2/HH_477127614" destination="synapses" segmentId="0" fractionAlong="0.5"/>
            <input id="3" target="../popExc/3/HH_477127614" destination="synapses" segmentId="0" fractionAlong="0.5"/>
            <input id="4" target="../popExc/4/HH_477127614" destination="synapses" segmentId="0" fractionAlong="0.5"/>
            <input id="5" target="../popExc/5/HH_477127614" destination="synapses" segmentId="0" fractionAlong="0.5"/>
            <input id="6" target="../popExc/6/HH_477127614" destination="synapses" segmentId="0" fractionAlong="0.5"/>
            <input id="7" target="../popExc/7/HH_477127614" destination="synapses" segmentId="0" fractionAlong="0.5"/>
            <input id="8" target="../popExc/8/HH_477127614" destination="synapses" segmentId="0" fractionAlong="0.5"/>
            <input id="9" target="../popExc/9/HH_477127614" destination="synapses" segmentId="0" fractionAlong="0.5"/>
            <input id="10" target="../popExc/10/HH_477127614" destination="synapses" segmentId="0" fractionAlong="0.5"/>
            <input id="11" target="../popExc/11/HH_477127614" destination="synapses" segmentId="0" fractionAlong="0.5"/>
            <input id="12" target="../popExc/12/HH_477127614" destination="synapses" segmentId="0" fractionAlong="0.5"/>
            <input id="13" target="../popExc/13/HH_477127614" destination="synapses" segmentId="0" fractionAlong="0.5"/>
            <input id="14" target="../popExc/14/HH_477127614" destination="synapses" segmentId="0" fractionAlong="0.5"/>
            <input id="15" target="../popExc/15/HH_477127614" destination="synapses" segmentId="0" fractionAlong="0.5"/>
        </inputList>
    </network>
</neuroml>
