<neuroml xmlns="http://www.neuroml.org/schema/neuroml2"  xmlns:xs="http://www.w3.org/2001/XMLSchema" xmlns:xsi="http://www.w3.org/2001/XMLSchema-instance" xsi:schemaLocation="http://www.neuroml.org/schema/neuroml2 https://raw.github.com/NeuroML/NeuroML2/development/Schemas/NeuroML2/NeuroML_v2beta5.xsd" id="Balanced_610cells_0conns">
    <notes>

This NeuroML 2 file was generated by OpenCortex v0.1.0 using:
    libNeuroML v0.2.30
    pyNeuroML v0.2.12

    </notes>
    <property tag="Network seed" value="1234"/>
    <include href="Balanced/HH_477127614.cell.nml"></include>
    <include href="Balanced/IMchan.channel.nml"></include>
    <include href="Balanced/Kd.channel.nml"></include>
    <include href="Balanced/Leak.channel.nml"></include>
    <include href="Balanced/Na.channel.nml"></include>
    <include href="Balanced/HH_476686112.cell.nml"></include>
    <include href="Balanced/IMchan.channel.nml"></include>
    <include href="Balanced/Kd.channel.nml"></include>
    <include href="Balanced/Leak.channel.nml"></include>
    <include href="Balanced/Na.channel.nml"></include>
    <include href="Balanced/cADpyr229_L23_PC_5ecbf9b163_0_0.cell.nml"></include>
    <include href="Balanced/pas.channel.nml"></include>
    <include href="Balanced/Ih.channel.nml"></include>
    <include href="Balanced/NaTs2_t.channel.nml"></include>
    <include href="Balanced/SKv3_1.channel.nml"></include>
    <include href="Balanced/Im.channel.nml"></include>
    <include href="Balanced/NaTa_t.channel.nml"></include>
    <include href="Balanced/K_Tst.channel.nml"></include>
    <include href="Balanced/Nap_Et2.channel.nml"></include>
    <include href="Balanced/SK_E2.channel.nml"></include>
    <include href="Balanced/Ca_HVA.channel.nml"></include>
    <include href="Balanced/K_Pst.channel.nml"></include>
    <include href="Balanced/CaDynamics_E2_NML2.nml"></include>
    <include href="Balanced/Ca_LVAst.channel.nml"></include>
    <expTwoSynapse id="synAmpa1" gbase="1nS" erev="0mV" tauDecay="5ms" tauRise="0.5ms"/>
    <expTwoSynapse id="synGaba1" gbase="2nS" erev="-80mV" tauDecay="20ms" tauRise="1ms"/>
    <poissonFiringSynapse id="psf1" averageRate="150 Hz" synapse="synAmpa1" spikeTarget="./synAmpa1"/>
    <network id="Balanced_610cells_0conns" type="networkWithTemperature" temperature="32degC">
        <population id="popExc" component="HH_477127614" size="400" type="populationList">
            <instance id="0">
                <location x="573.162828554000043" y="70.366299587699999" z="104.494882035000003"/>
            </instance>
            <instance id="1">
                <location x="528.780769959000054" y="319.634498682000014" z="449.336543834999986"/>
            </instance>
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        </population>
        <population id="popInh" component="HH_476686112" size="200" type="populationList">
            <instance id="0">
                <location x="273.647013415000004" y="115.232808997999996" z="162.957276228000012"/>
            </instance>
            <instance id="1">
                <location x="532.117072440000015" y="96.309248901199993" z="481.396725762000017"/>
            </instance>
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        </population>
        <population id="popBBP" component="cADpyr229_L23_PC_5ecbf9b163_0_0" size="10" type="populationList">
            <instance id="0">
                <location x="-135.634130241999998" y="183.014492170000011" z="367.613056534000009"/>
            </instance>
            <instance id="1">
                <location x="553.473089144000028" y="238.699442363000003" z="622.379155644999969"/>
            </instance>
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        </population>
        <inputList id="Stim0" population="popExc" component="psf1">
            <input id="0" target="../popExc/0/HH_477127614" destination="synapses" segmentId="0" fractionAlong="0.5"/>
            <input id="1" target="../popExc/1/HH_477127614" destination="synapses" segmentId="0" fractionAlong="0.5"/>
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        </inputList>
    </network>
</neuroml>
