<neuroml xmlns="http://www.neuroml.org/schema/neuroml2"  xmlns:xs="http://www.w3.org/2001/XMLSchema" xmlns:xsi="http://www.w3.org/2001/XMLSchema-instance" xsi:schemaLocation="http://www.neuroml.org/schema/neuroml2 https://raw.github.com/NeuroML/NeuroML2/development/Schemas/NeuroML2/NeuroML_v2beta4.xsd" id="Balanced_x10_noConns">
    <notes>

This NeuroML 2 file was generated by OpenCortex v0.0.5 using:
    libNeuroML v0.2.15
    pyNeuroML v0.1.13

    </notes>
    <property tag="Python random seed" value="1234"/>
    <include href="Balanced_x10_noConns/HH_464198958.cell.nml"></include>
    <include href="Balanced_x10_noConns/IM.channel.nml"></include>
    <include href="Balanced_x10_noConns/Kd.channel.nml"></include>
    <include href="Balanced_x10_noConns/Leak.channel.nml"></include>
    <include href="Balanced_x10_noConns/Na.channel.nml"></include>
    <include href="Balanced_x10_noConns/HH_471141261.cell.nml"></include>
    <include href="Balanced_x10_noConns/IM.channel.nml"></include>
    <include href="Balanced_x10_noConns/Kd.channel.nml"></include>
    <include href="Balanced_x10_noConns/Leak.channel.nml"></include>
    <include href="Balanced_x10_noConns/Na.channel.nml"></include>
    <include href="Balanced_x10_noConns/cADpyr229_L23_PC_5ecbf9b163_0_0.cell.nml"></include>
    <include href="Balanced_x10_noConns/pas.channel.nml"></include>
    <include href="Balanced_x10_noConns/Ih.channel.nml"></include>
    <include href="Balanced_x10_noConns/NaTs2_t.channel.nml"></include>
    <include href="Balanced_x10_noConns/SKv3_1.channel.nml"></include>
    <include href="Balanced_x10_noConns/Im.channel.nml"></include>
    <include href="Balanced_x10_noConns/NaTa_t.channel.nml"></include>
    <include href="Balanced_x10_noConns/K_Tst.channel.nml"></include>
    <include href="Balanced_x10_noConns/Nap_Et2.channel.nml"></include>
    <include href="Balanced_x10_noConns/SK_E2.channel.nml"></include>
    <include href="Balanced_x10_noConns/Ca_HVA.channel.nml"></include>
    <include href="Balanced_x10_noConns/K_Pst.channel.nml"></include>
    <include href="Balanced_x10_noConns/CaDynamics_E2_NML2.nml"></include>
    <include href="Balanced_x10_noConns/Ca_LVAst.channel.nml"></include>
    <expTwoSynapse id="synAmpa1" gbase="1nS" erev="0mV" tauDecay="5ms" tauRise="0.5ms"/>
    <expTwoSynapse id="synGaba1" gbase="2nS" erev="-80mV" tauDecay="20ms" tauRise="1ms"/>
    <poissonFiringSynapse id="psf1" averageRate="150 Hz" synapse="synAmpa1" spikeTarget="./synAmpa1"/>
    <network id="Balanced_x10_noConns">
        <population id="popExc" component="HH_464198958" size="800" type="populationList">
            <instance id="0">
                <location x="573.162828554000043" y="70.366299587699999" z="104.494882035000003"/>
            </instance>
            <instance id="1">
                <location x="528.780769959000054" y="319.634498682000014" z="449.336543834999986"/>
            </instance>
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        </population>
        <population id="popInh" component="HH_471141261" size="400" type="populationList">
            <instance id="0">
                <location x="257.494910467000011" y="-124.464165335000004" z="248.350915081000011"/>
            </instance>
            <instance id="1">
                <location x="48.543189868299997" y="83.645470345299998" z="315.283125515999984"/>
            </instance>
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        </population>
        <population id="popBBP" component="cADpyr229_L23_PC_5ecbf9b163_0_0" size="10" type="populationList">
            <instance id="0">
                <location x="-131.556457660999996" y="324.311309967999989" z="286.258227491000014"/>
            </instance>
            <instance id="1">
                <location x="24.750764218299999" y="239.640932797999994" z="468.616257761999975"/>
            </instance>
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        </population>
        <inputList id="Stim0" population="popExc" component="psf1">
            <input id="0" target="../popExc/0/HH_464198958" destination="synapses"/>
            <input id="1" target="../popExc/1/HH_464198958" destination="synapses"/>
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        </inputList>
    </network>
</neuroml>
