<neuroml xmlns="http://www.neuroml.org/schema/neuroml2"  xmlns:xs="http://www.w3.org/2001/XMLSchema" xmlns:xsi="http://www.w3.org/2001/XMLSchema-instance" xsi:schemaLocation="http://www.neuroml.org/schema/neuroml2 https://raw.github.com/NeuroML/NeuroML2/development/Schemas/NeuroML2/NeuroML_v2beta4.xsd" id="Deterministic">
    <notes>

This NeuroML 2 file was generated by OpenCortex v0.0.5 using:
    libNeuroML v0.2.14
    pyNeuroML v0.1.11

    </notes>
    <property tag="Python random seed" value="1234"/>
    <ionChannel id="Ca_pyr" species="ca" type="ionChannelHH" conductance="10pS">
        <notes></notes>
        <gate id="m" instances="2" type="gateHHrates">
            <forwardRate type="HHSigmoidRate" rate="1.6e3per_s" midpoint="5e-03V" scale="0.01389V"/>
            <reverseRate type="HHExpLinearRate" rate="1e2per_s" midpoint="-8.9e-3V" scale="-0.005V"/>
        </gate>
        <gate id="h" instances="1" type="gateHHtauInf">
            <timeCourse type="Ca_pyr_h_tau_tau"/>
            <steadyState type="Ca_pyr_h_inf_inf"/>
        </gate>
    </ionChannel>
    <ionChannel id="Kahp_pyr" species="k" type="ionChannelHH" conductance="10pS">
        <notes></notes>
        <gate id="z" instances="1" type="gateHHrates">
            <forwardRate type="Kahp_pyr_z_alpha_rate"/>
            <reverseRate type="Kahp_pyr_z_beta_rate"/>
        </gate>
    </ionChannel>
    <ionChannel id="Kdr_pyr" species="k" type="ionChannelHH" conductance="10pS">
        <notes></notes>
        <gate id="n" instances="1" type="gateHHrates">
            <forwardRate type="HHExpLinearRate" rate="40per_s" midpoint="-2.49e-2V" scale="0.005V"/>
            <reverseRate type="HHExpRate" rate="125per_s" midpoint="-4e-2V" scale="-0.04V"/>
        </gate>
    </ionChannel>
    <ionChannel id="LeakConductance_pyr" type="ionChannelPassive" conductance="10pS">
        <notes>Simple example of a leak/passive conductance. Note: for GENESIS cells with a single leak conductance,
        it is better to use the Rm and Em variables for a passive current.</notes>
    </ionChannel>
    <ionChannel id="Na_pyr" species="na" type="ionChannelHH" conductance="10pS">
        <notes></notes>
        <gate id="m" instances="2" type="gateHHrates">
            <forwardRate type="HHExpLinearRate" rate="1.28e3per_s" midpoint="-4.69e-2V" scale="0.004V"/>
            <reverseRate type="HHExpLinearRate" rate="1.4e3per_s" midpoint="-19.9e-3V" scale="-0.005V"/>
        </gate>
        <gate id="h" instances="1" type="gateHHrates">
            <forwardRate type="HHExpRate" rate="1.28e2per_s" midpoint="-4.3e-2V" scale="-0.018V"/>
            <reverseRate type="HHSigmoidRate" rate="4e3per_s" midpoint="-2e-2V" scale="0.005V"/>
        </gate>
    </ionChannel>
    <fixedFactorConcentrationModel id="Ca_conc" ion="ca" restingConc="0.0mM" decayConstant="0.1s" rho="9543.150099999999mol_per_m_per_A_per_s"/>
    <expTwoSynapse id="synAmpa1" gbase="1nS" erev="0mV" tauDecay="10ms" tauRise="0.5ms"/>
    <expTwoSynapse id="synGaba1" gbase="1nS" erev="-70mV" tauDecay="20ms" tauRise="2ms"/>
    <cell id="pyr_4_sym_soma">
        <notes>A single segment/compartment cell</notes>
        <morphology id="morphology_pyr_4_sym_soma">
            <segment id="0" name="soma">
                <proximal x="0.000000e+00" y="0.000000e+00" z="0.000000e+00" diameter="2.300000e+01"/>
                <distal x="0.000000e+00" y="1.700000e+01" z="0.000000e+00" diameter="2.300000e+01"/>
            </segment>
            <segmentGroup neuroLexId="sao864921383" id="soma">
                <member segment="0"/>
            </segmentGroup>
            <segmentGroup id="all">
                <include segmentGroup="soma"/>
            </segmentGroup>
            <segmentGroup neuroLexId="GO:0043025" id="soma_group">
                <include segmentGroup="soma"/>
            </segmentGroup>
        </morphology>
        <biophysicalProperties id="biophys">
            <membraneProperties>
                <channelDensity id="Ca_pyr_soma_group" ionChannel="Ca_pyr" condDensity="10.0 mS_per_cm2" erev="80.0 mV" segmentGroup="soma_group" ion="ca"/>
                <channelDensity id="Kahp_pyr_soma_group" ionChannel="Kahp_pyr" condDensity="2.5 mS_per_cm2" erev="-75.0 mV" segmentGroup="soma_group" ion="k"/>
                <channelDensity id="Kdr_pyr_soma_group" ionChannel="Kdr_pyr" condDensity="80.0 mS_per_cm2" erev="-75.0 mV" segmentGroup="soma_group" ion="k"/>
                <channelDensity id="LeakConductance_pyr_all" ionChannel="LeakConductance_pyr" condDensity="0.1420051 mS_per_cm2" erev="-66.0 mV" ion="non_specific"/>
                <channelDensity id="Na_pyr_soma_group" ionChannel="Na_pyr" condDensity="120.0 mS_per_cm2" erev="55.0 mV" segmentGroup="soma_group" ion="na"/>
                <spikeThresh value="0.0 mV"/>
                <specificCapacitance value="2.84 uF_per_cm2"/>
                <initMembPotential value="-65.0 mV"/>
            </membraneProperties>
            <intracellularProperties>
                <species id="ca" concentrationModel="Ca_conc" ion="ca" initialConcentration="5.0E-11 mol_per_cm3" initialExtConcentration="3.0E-6 mol_per_cm3"/>
                <resistivity value="0.2 kohm_cm"/>
            </intracellularProperties>
        </biophysicalProperties>
    </cell>
    <iafCell id="iaf" leakReversal="-65mV" thresh="-50mV" reset="-70mV" C="0.2nF" leakConductance="0.01uS"/>
    <izhikevich2007Cell id="RS" C="100 pF" v0="-60mV" k="0.7 nS_per_mV" vr="-60 mV" vt="-40 mV" vpeak="35 mV" a="0.03 per_ms" b="-2 nS" c="-50 mV" d="100 pA"/>
    <pulseGenerator id="pg0" delay="50ms" duration="400ms" amplitude="0.6nA"/>
    <pulseGenerator id="pg1" delay="50ms" duration="400ms" amplitude="0.5nA"/>
    <network id="Deterministic">
        <population id="pop_iaf" component="iaf" size="5" type="populationList">
            <instance id="0">
                <location x="483.226767845999973" y="44.073259917500003" z="3.74573502929"/>
            </instance>
            <instance id="1">
                <location x="455.487981224999999" y="93.926899736400003" z="291.113786528999981"/>
            </instance>
            <instance id="2">
                <location x="335.78174074399999" y="8.393822683710001" z="383.240466395999988"/>
            </instance>
            <instance id="3">
                <location x="118.404887681999995" y="3.08140217266" z="394.386358617999974"/>
            </instance>
            <instance id="4">
                <location x="173.044482799000008" y="62.328147503899999" z="307.907847552000021"/>
            </instance>
        </population>
        <population id="pop_rs" component="RS" size="5" type="populationList">
            <instance id="0">
                <location x="74.277319354100001" y="118.309064741" z="57.2064848443"/>
            </instance>
            <instance id="1">
                <location x="7.30939024345" y="148.675154060000011" z="482.450780457999997"/>
            </instance>
            <instance id="2">
                <location x="32.281140488600002" y="154.108818554999999" z="232.949279504000003"/>
            </instance>
            <instance id="3">
                <location x="300.731724781000025" y="108.892882998999994" z="289.501343093999992"/>
            </instance>
            <instance id="4">
                <location x="134.792751909999993" y="155.643256056000013" z="322.317117089000021"/>
            </instance>
        </population>
        <projection id="proj0_pop_iaf_pop_rs" presynapticPopulation="pop_iaf" postsynapticPopulation="pop_rs" synapse="synAmpa1">
            <connectionWD id="0" preCellId="../pop_iaf/0/iaf" postCellId="../pop_rs/0/RS" weight="1." delay="0 ms"/>
            <connectionWD id="1" preCellId="../pop_iaf/0/iaf" postCellId="../pop_rs/1/RS" weight="1." delay="0 ms"/>
            <connectionWD id="2" preCellId="../pop_iaf/0/iaf" postCellId="../pop_rs/2/RS" weight="1." delay="0 ms"/>
            <connectionWD id="3" preCellId="../pop_iaf/0/iaf" postCellId="../pop_rs/4/RS" weight="1." delay="0 ms"/>
            <connectionWD id="4" preCellId="../pop_iaf/1/iaf" postCellId="../pop_rs/1/RS" weight="1." delay="0 ms"/>
            <connectionWD id="5" preCellId="../pop_iaf/1/iaf" postCellId="../pop_rs/3/RS" weight="1." delay="0 ms"/>
            <connectionWD id="6" preCellId="../pop_iaf/1/iaf" postCellId="../pop_rs/4/RS" weight="1." delay="0 ms"/>
            <connectionWD id="7" preCellId="../pop_iaf/2/iaf" postCellId="../pop_rs/0/RS" weight="1." delay="0 ms"/>
            <connectionWD id="8" preCellId="../pop_iaf/2/iaf" postCellId="../pop_rs/1/RS" weight="1." delay="0 ms"/>
            <connectionWD id="9" preCellId="../pop_iaf/2/iaf" postCellId="../pop_rs/2/RS" weight="1." delay="0 ms"/>
            <connectionWD id="10" preCellId="../pop_iaf/2/iaf" postCellId="../pop_rs/4/RS" weight="1." delay="0 ms"/>
            <connectionWD id="11" preCellId="../pop_iaf/3/iaf" postCellId="../pop_rs/1/RS" weight="1." delay="0 ms"/>
            <connectionWD id="12" preCellId="../pop_iaf/4/iaf" postCellId="../pop_rs/0/RS" weight="1." delay="0 ms"/>
            <connectionWD id="13" preCellId="../pop_iaf/4/iaf" postCellId="../pop_rs/1/RS" weight="1." delay="0 ms"/>
            <connectionWD id="14" preCellId="../pop_iaf/4/iaf" postCellId="../pop_rs/2/RS" weight="1." delay="0 ms"/>
            <connectionWD id="15" preCellId="../pop_iaf/4/iaf" postCellId="../pop_rs/3/RS" weight="1." delay="0 ms"/>
        </projection>
        <inputList id="Stim0" population="pop_iaf" component="pg0">
            <input id="0" target="../pop_iaf/0/iaf" destination="synapses"/>
            <input id="1" target="../pop_iaf/2/iaf" destination="synapses"/>
        </inputList>
        <inputList id="Stim1" population="pop_iaf" component="pg1">
            <input id="0" target="../pop_iaf/3/iaf" destination="synapses"/>
            <input id="1" target="../pop_iaf/4/iaf" destination="synapses"/>
        </inputList>
    </network>
    <ComponentType name="Ca_pyr_h_tau_tau" extends="baseVoltageDepTime">
        <Constant name="TIME_SCALE" dimension="time" value="1 s"/>
        <Constant name="VOLT_SCALE" dimension="voltage" value="1 V"/>
        <Dynamics>
            <DerivedVariable name="V" dimension="none" value="v / VOLT_SCALE"/>
            <DerivedVariable name="t" dimension="time" value="(0.2) * TIME_SCALE" exposure="t"/>
        </Dynamics>
    </ComponentType>
    <ComponentType name="Ca_pyr_h_inf_inf" extends="baseVoltageDepVariable">
        <Constant name="TIME_SCALE" dimension="time" value="1 s"/>
        <Constant name="VOLT_SCALE" dimension="voltage" value="1 V"/>
        <Dynamics>
            <DerivedVariable name="V" dimension="none" value="v / VOLT_SCALE"/>
            <ConditionalDerivedVariable name="x" dimension="none" exposure="x">
                <Case condition="V  .gt. ( -0.06 )" value=" (exp (-50*(V + 0.06))) "/>
                <Case value=" 1"/>
            </ConditionalDerivedVariable>
        </Dynamics>
    </ComponentType>
    <ComponentType name="Kahp_pyr_z_alpha_rate" extends="baseVoltageConcDepRate">
        <Constant name="TIME_SCALE" dimension="time" value="1 s"/>
        <Constant name="VOLT_SCALE" dimension="voltage" value="1 V"/>
        <Constant name="CONC_SCALE" dimension="concentration" value="1 mM"/>
        <Dynamics>
            <DerivedVariable name="V" dimension="none" value="v / VOLT_SCALE"/>
            <DerivedVariable name="ca_conc" dimension="none" value="caConc / CONC_SCALE"/>
            <ConditionalDerivedVariable name="r" dimension="per_time" exposure="r">
                <Case condition="ca_conc  .lt. ( 500.0 )" value="( 0.4 * ca_conc ) / TIME_SCALE"/>
                <Case value="( 200) / TIME_SCALE"/>
            </ConditionalDerivedVariable>
        </Dynamics>
    </ComponentType>
    <ComponentType name="Kahp_pyr_z_beta_rate" extends="baseVoltageConcDepRate">
        <Constant name="TIME_SCALE" dimension="time" value="1 s"/>
        <Constant name="VOLT_SCALE" dimension="voltage" value="1 V"/>
        <Constant name="CONC_SCALE" dimension="concentration" value="1 mM"/>
        <Dynamics>
            <DerivedVariable name="V" dimension="none" value="v / VOLT_SCALE"/>
            <DerivedVariable name="ca_conc" dimension="none" value="caConc / CONC_SCALE"/>
            <DerivedVariable name="r" dimension="per_time" value="(20) / TIME_SCALE" exposure="r"/>
        </Dynamics>
    </ComponentType>
</neuroml>
