<neuroml xmlns="http://www.neuroml.org/schema/neuroml2"  xmlns:xs="http://www.w3.org/2001/XMLSchema" xmlns:xsi="http://www.w3.org/2001/XMLSchema-instance" xsi:schemaLocation="http://www.neuroml.org/schema/neuroml2 https://raw.github.com/NeuroML/NeuroML2/development/Schemas/NeuroML2/NeuroML_v2beta4.xsd" id="IClamps">
    <notes>

This NeuroML 2 file was generated by OpenCortex v0.0.5 using:
    libNeuroML v0.2.12
    pyNeuroML v0.1.11

    </notes>

    <include href="CaDynamics_E2_NML2.nml"/>

    <property tag="Python random seed" value="1234"/>
    <ionChannel id="Ca_pyr" species="ca" type="ionChannelHH" conductance="10pS">
        <notes></notes>
        <gate id="m" instances="2" type="gateHHrates">
            <forwardRate type="HHSigmoidRate" rate="1.6e3per_s" midpoint="5e-03V" scale="0.01389V"/>
            <reverseRate type="HHExpLinearRate" rate="1e2per_s" midpoint="-8.9e-3V" scale="-0.005V"/>
        </gate>
        <gate id="h" instances="1" type="gateHHtauInf">
            <timeCourse type="Ca_pyr_h_tau_tau"/>
            <steadyState type="Ca_pyr_h_inf_inf"/>
        </gate>
    </ionChannel>
    <ionChannel id="Kahp_pyr" species="k" type="ionChannelHH" conductance="10pS">
        <notes></notes>
        <gate id="z" instances="1" type="gateHHrates">
            <forwardRate type="Kahp_pyr_z_alpha_rate"/>
            <reverseRate type="Kahp_pyr_z_beta_rate"/>
        </gate>
    </ionChannel>
    <ionChannel id="Kdr_pyr" species="k" type="ionChannelHH" conductance="10pS">
        <notes></notes>
        <gate id="n" instances="1" type="gateHHrates">
            <forwardRate type="HHExpLinearRate" rate="40per_s" midpoint="-2.49e-2V" scale="0.005V"/>
            <reverseRate type="HHExpRate" rate="125per_s" midpoint="-4e-2V" scale="-0.04V"/>
        </gate>
    </ionChannel>
    <ionChannel id="LeakConductance_pyr" type="ionChannelPassive" conductance="10pS">
        <notes>Simple example of a leak/passive conductance. Note: for GENESIS cells with a single leak conductance,
        it is better to use the Rm and Em variables for a passive current.</notes>
    </ionChannel>
    <ionChannel id="Na_pyr" species="na" type="ionChannelHH" conductance="10pS">
        <notes></notes>
        <gate id="m" instances="2" type="gateHHrates">
            <forwardRate type="HHExpLinearRate" rate="1.28e3per_s" midpoint="-4.69e-2V" scale="0.004V"/>
            <reverseRate type="HHExpLinearRate" rate="1.4e3per_s" midpoint="-19.9e-3V" scale="-0.005V"/>
        </gate>
        <gate id="h" instances="1" type="gateHHrates">
            <forwardRate type="HHExpRate" rate="1.28e2per_s" midpoint="-4.3e-2V" scale="-0.018V"/>
            <reverseRate type="HHSigmoidRate" rate="4e3per_s" midpoint="-2e-2V" scale="0.005V"/>
        </gate>
    </ionChannel>
    <ionChannel id="pas" type="ionChannelPassive" conductance="10pS">
        <notes>Simple example of a leak/passive conductance. Note: for GENESIS cells with a single leak conductance,
        it is better to use the Rm and Em variables for a passive current.</notes>
    </ionChannel>
    <ionChannel id="Ih" species="hcn" type="ionChannelHH" conductance="10pS">
        <notes>Non-specific cation current

Comment from original mod file:
Reference : :		Kole,Hallermann,and Stuart, J. Neurosci. 2006</notes>
        <gate id="m" instances="1" type="gateHHrates">
            <forwardRate type="HHExpLinearRate" rate="0.076517per_ms" midpoint="-154.9mV" scale="-11.9mV"/>
            <reverseRate type="HHExpRate" rate="0.193per_ms" midpoint="0mV" scale="33.1mV"/>
        </gate>
    </ionChannel>
    <ionChannel id="NaTs2_t" species="na" type="ionChannelHH" conductance="10pS">
        <notes>Fast inactivating Na+ current. Comment from mod file (NaTs2_t.mod): took the NaTa and shifted both activation/inactivation by 6 mv</notes>
        <gate id="m" instances="3" type="gateHHrates">
            <q10Settings type="q10Fixed" fixedQ10="2.95288264"/>
            <forwardRate type="HHExpLinearRate" rate="1.092per_ms" midpoint="-32mV" scale="6mV"/>
            <reverseRate type="HHExpLinearRate" rate="0.744per_ms" midpoint="-32mV" scale="-6mV"/>
        </gate>
        <gate id="h" instances="1" type="gateHHrates">
            <q10Settings type="q10Fixed" fixedQ10="2.95288264"/>
            <forwardRate type="HHExpLinearRate" rate="0.09per_ms" midpoint="-60mV" scale="-6mV"/>
            <reverseRate type="HHExpLinearRate" rate="0.09per_ms" midpoint="-60mV" scale="6mV"/>
        </gate>
    </ionChannel>
    <ionChannel id="SKv3_1" species="k" type="ionChannelHH" conductance="10pS">
        <notes>Fast, non inactivating K+ current

Comment from original mod file:
:Reference : :		Characterization of a Shaw-related potassium channel family in rat brain, The EMBO Journal, vol.11, no.7,2473-2486 (1992)</notes>
        <gate id="m" instances="1" type="gateHHtauInf">
            <timeCourse type="SKv3_1_m_tau_tau"/>
            <steadyState type="HHSigmoidVariable" rate="1." midpoint="18.7mV" scale="9.7mV"/>
        </gate>
    </ionChannel>
    <ionChannel id="Im" species="k" type="ionChannelHH" conductance="10pS">
        <notes>Muscarinic K+ current

Comment from original mod file:
:Reference : :		Adams et al. 1982 - M-currents and other potassium currents in bullfrog sympathetic neurones
:Comment: corrected rates using q10 = 2.3, target temperature 34, orginal 21</notes>
        <gate id="m" instances="1" type="gateHHrates">
            <q10Settings type="q10Fixed" fixedQ10="2.95288264"/>
            <forwardRate type="HHExpRate" rate="0.0033per_ms" midpoint="-35mV" scale="10mV"/>
            <reverseRate type="HHExpRate" rate="0.0033per_ms" midpoint="-35mV" scale="-10mV"/>
        </gate>
    </ionChannel>
    <ionChannel id="NaTa_t" species="na" type="ionChannelHH" conductance="10pS">
        <notes>Fast inactivating Na+ current

Comment from original mod file:
:Reference :Colbert and Pan 2002</notes>
        <gate id="m" instances="3" type="gateHHrates">
            <q10Settings type="q10Fixed" fixedQ10="2.95288264"/>
            <forwardRate type="HHExpLinearRate" rate="1.092per_ms" midpoint="-38mV" scale="6mV"/>
            <reverseRate type="HHExpLinearRate" rate="0.744per_ms" midpoint="-38mV" scale="-6mV"/>
        </gate>
        <gate id="h" instances="1" type="gateHHrates">
            <q10Settings type="q10Fixed" fixedQ10="2.95288264"/>
            <forwardRate type="HHExpLinearRate" rate="0.09per_ms" midpoint="-66mV" scale="-6mV"/>
            <reverseRate type="HHExpLinearRate" rate="0.09per_ms" midpoint="-66mV" scale="6mV"/>
        </gate>
    </ionChannel>
    <ionChannel id="K_Tst" species="k" type="ionChannelHH" conductance="10pS">
        <notes>Fast inactivating K+ current

Comment from original mod file:
:Comment : The transient component of the K current
:Reference : :		Voltage-gated K+ channels in layer 5 neocortical pyramidal neurones from young rats:subtypes and gradients,Korngreen and Sakmann, J. Physiology, 2000
:Comment : shifted -10 mv to correct for junction potential
:Comment: corrected rates using q10 = 2.3, target temperature 34, orginal 21</notes>
        <gate id="m" instances="4" type="gateHHtauInf">
            <q10Settings type="q10Fixed" fixedQ10="2.95288264"/>
            <timeCourse type="K_Tst_m_tau_tau"/>
            <steadyState type="HHSigmoidVariable" rate="1." midpoint="-10mV" scale="19mV"/>
        </gate>
        <gate id="h" instances="1" type="gateHHtauInf">
            <q10Settings type="q10Fixed" fixedQ10="2.95288264"/>
            <timeCourse type="K_Tst_h_tau_tau"/>
            <steadyState type="HHSigmoidVariable" rate="1." midpoint="-76mV" scale="-10mV"/>
        </gate>
    </ionChannel>
    <ionChannel id="Nap_Et2" species="na" type="ionChannelHH" conductance="10pS">
        <notes>Persistent Na+ current

Comment from original mod file:
:Comment : mtau deduced from text (said to be 6 times faster than for NaTa)
:Comment : so I used the equations from NaT and multiplied by 6
:Reference : Modeled according to kinetics derived from Magistretti and Alonso 1999
:Comment: corrected rates using q10 = 2.3, target temperature 34, orginal 21</notes>
        <gate id="m" instances="3" type="gateHHratesTauInf">
            <q10Settings type="q10Fixed" fixedQ10="2.95288264"/>
            <forwardRate type="HHExpLinearRate" rate="1.092per_ms" midpoint="-38mV" scale="6mV"/>
            <reverseRate type="HHExpLinearRate" rate="0.744per_ms" midpoint="-38mV" scale="-6mV"/>
            <timeCourse type="Nap_Et2_m_tau_tau"/>
            <steadyState type="HHSigmoidVariable" rate="1." midpoint="-52.6mV" scale="4.6mV"/>
        </gate>
        <gate id="h" instances="1" type="gateHHratesInf">
            <q10Settings type="q10Fixed" fixedQ10="2.95288264"/>
            <forwardRate type="HHExpLinearRate" rate="1.33344e-05per_ms" midpoint="-17mV" scale="-4.63mV"/>
            <reverseRate type="HHExpLinearRate" rate="1.82522e-05per_ms" midpoint="-64.4mV" scale="2.63mV"/>
            <steadyState type="HHSigmoidVariable" rate="1." midpoint="-48.8mV" scale="-10mV"/>
        </gate>
    </ionChannel>
    <ionChannel id="SK_E2" species="k" type="ionChannelHH" conductance="10pS">
        <notes>Small-conductance, Ca2+ activated K+ current

Comment from original mod file:
: SK-type calcium-activated potassium current
: Reference : Kohler et al. 1996</notes>
        <gate id="z" instances="1" type="gateHHtauInf">
            <timeCourse type="SK_E2_z_tau_tau"/>
            <steadyState type="SK_E2_z_inf_inf"/>
        </gate>
    </ionChannel>
    <ionChannel id="Ca_HVA" species="ca" type="ionChannelHH" conductance="10pS">
        <notes>High voltage activated Ca2+ current.

Comment from original mod file:
Reuveni, Friedman, Amitai, and Gutnick, J.Neurosci. 1993</notes>
        <gate id="m" instances="2" type="gateHHrates">
            <forwardRate type="HHExpLinearRate" rate="0.209per_ms" midpoint="-27mV" scale="3.8mV"/>
            <reverseRate type="HHExpRate" rate="0.94per_ms" midpoint="-75mV" scale="-17mV"/>
        </gate>
        <gate id="h" instances="1" type="gateHHrates">
            <forwardRate type="HHExpRate" rate="0.000457per_ms" midpoint="-13mV" scale="-50mV"/>
            <reverseRate type="HHSigmoidRate" rate="0.0065per_ms" midpoint="-15mV" scale="28mV"/>
        </gate>
    </ionChannel>
    <ionChannel id="K_Pst" species="k" type="ionChannelHH" conductance="10pS">
        <notes>Slow inactivating K+ current

Comment from original mod file:
:Comment : The persistent component of the K current
:Reference : :		Voltage-gated K+ channels in layer 5 neocortical pyramidal neurones from young rats:subtypes and gradients,Korngreen and Sakmann, J. Physiology, 2000
:Comment : shifted -10 mv to correct for junction potential
:Comment: corrected rates using q10 = 2.3, target temperature 34, orginal 21</notes>
        <gate id="m" instances="2" type="gateHHtauInf">
            <q10Settings type="q10Fixed" fixedQ10="2.95288264"/>
            <timeCourse type="K_Pst_m_tau_tau"/>
            <steadyState type="HHSigmoidVariable" rate="1." midpoint="-11mV" scale="12mV"/>
        </gate>
        <gate id="h" instances="1" type="gateHHtauInf">
            <q10Settings type="q10Fixed" fixedQ10="2.95288264"/>
            <timeCourse type="K_Pst_h_tau_tau"/>
            <steadyState type="HHSigmoidVariable" rate="1." midpoint="-64mV" scale="-11mV"/>
        </gate>
    </ionChannel>
    <ionChannel id="Ca_LVAst" species="ca" type="ionChannelHH" conductance="10pS">
        <notes>Low voltage activated Ca2+ current

Comment from original mod file:
Note: mtau is an approximation from the plots
:Reference : :		Avery and Johnston 1996, tau from Randall 1997
:Comment: shifted by -10 mv to correct for junction potential
:Comment: corrected rates using q10 = 2.3, target temperature 34, orginal 21</notes>
        <gate id="m" instances="2" type="gateHHtauInf">
            <q10Settings type="q10Fixed" fixedQ10="2.95288264"/>
            <timeCourse type="Ca_LVAst_m_tau_tau"/>
            <steadyState type="HHSigmoidVariable" rate="1." midpoint="-40mV" scale="6mV"/>
        </gate>
        <gate id="h" instances="1" type="gateHHtauInf">
            <q10Settings type="q10Fixed" fixedQ10="2.95288264"/>
            <timeCourse type="Ca_LVAst_h_tau_tau"/>
            <steadyState type="HHSigmoidVariable" rate="1." midpoint="-90mV" scale="-6.4mV"/>
        </gate>
    </ionChannel>
    <fixedFactorConcentrationModel id="Ca_conc" ion="ca" restingConc="0.0mM" decayConstant="0.1s" rho="9543.150099999999mol_per_m_per_A_per_s"/>
    <cell id="pyr_4_sym_soma">
        <notes>A single segment/compartment cell</notes>
        <morphology id="morphology_pyr_4_sym_soma">
            <segment id="0" name="soma">
                <proximal x="0.000000e+00" y="0.000000e+00" z="0.000000e+00" diameter="2.300000e+01"/>
                <distal x="0.000000e+00" y="1.700000e+01" z="0.000000e+00" diameter="2.300000e+01"/>
            </segment>
            <segmentGroup neuroLexId="sao864921383" id="soma">
                <member segment="0"/>
            </segmentGroup>
            <segmentGroup id="all">
                <include segmentGroup="soma"/>
            </segmentGroup>
            <segmentGroup neuroLexId="GO:0043025" id="soma_group">
                <include segmentGroup="soma"/>
            </segmentGroup>
        </morphology>
        <biophysicalProperties id="biophys">
            <membraneProperties>
                <channelDensity id="Ca_pyr_soma_group" ionChannel="Ca_pyr" condDensity="10.0 mS_per_cm2" erev="80.0 mV" segmentGroup="soma_group" ion="ca"/>
                <channelDensity id="Kahp_pyr_soma_group" ionChannel="Kahp_pyr" condDensity="2.5 mS_per_cm2" erev="-75.0 mV" segmentGroup="soma_group" ion="k"/>
                <channelDensity id="Kdr_pyr_soma_group" ionChannel="Kdr_pyr" condDensity="80.0 mS_per_cm2" erev="-75.0 mV" segmentGroup="soma_group" ion="k"/>
                <channelDensity id="LeakConductance_pyr_all" ionChannel="LeakConductance_pyr" condDensity="0.1420051 mS_per_cm2" erev="-66.0 mV" ion="non_specific"/>
                <channelDensity id="Na_pyr_soma_group" ionChannel="Na_pyr" condDensity="120.0 mS_per_cm2" erev="55.0 mV" segmentGroup="soma_group" ion="na"/>
                <spikeThresh value="0.0 mV"/>
                <specificCapacitance value="2.84 uF_per_cm2"/>
                <initMembPotential value="-65.0 mV"/>
            </membraneProperties>
            <intracellularProperties>
                <species id="ca" concentrationModel="Ca_conc" ion="ca" initialConcentration="5.0E-11 mol_per_cm3" initialExtConcentration="3.0E-6 mol_per_cm3"/>
                <resistivity value="0.2 kohm_cm"/>
            </intracellularProperties>
        </biophysicalProperties>
    </cell>
    <cell id="cADpyr229_L23_PC_5ecbf9b163_0_0">
        <notes>

Export of a cell model obtained from the BBP Neocortical Microcircuit Collaboration Portal into NeuroML2

******************************************************
*  This export to NeuroML2 has not yet been fully validated!!
*  Use with caution!!
******************************************************

For more information on this cell model see: https://bbp.epfl.ch/nmc-portal/microcircuit#/metype/L23_PC_L23PC/details

</notes>
        <morphology id="morphology">
            <segment id="0" name="Seg0_soma_0">
                <proximal x="2.575320e-01" y="-8.049430e+00" z="0.000000e+00" diameter="3.028240e+00"/>
                <distal x="1.803480e-01" y="-7.222060e+00" z="0.000000e+00" diameter="5.309970e+00"/>
            </segment>
            <segment id="2" name="Seg1_soma_0">
                <parent segment="0"/>
                <distal x="1.031640e-01" y="-6.394700e+00" z="0.000000e+00" diameter="7.922740e+00"/>
            </segment>
            <segment id="3" name="Seg2_soma_0">
                <parent segment="2"/>
                <distal x="2.597970e-02" y="-5.567330e+00" z="0.000000e+00" diameter="9.353900e+00"/>
            </segment>
            <segment id="4" name="Seg3_soma_0">
                <parent segment="3"/>
                <distal x="-5.120450e-02" y="-4.739960e+00" z="0.000000e+00" diameter="1.078510e+01"/>
            </segment>
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            <segmentGroup neuroLexId="sao864921383" id="soma_0">
                <notes>This group contains an unbranched set of segments, and all of the segmentGroups marked with
             neuroLexId = sao864921383 form a non-overlapping set of all of the segments.
             These segmentGroups correspond to the 'cables' of NeuroML v1.8.1, and map to/from NEURON sections.</notes>
                <member segment="0"/>
                <member segment="2"/>
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            </segmentGroup>
            <segmentGroup neuroLexId="sao864921383" id="apic_0">
                <notes>This group contains an unbranched set of segments, and all of the segmentGroups marked with
             neuroLexId = sao864921383 form a non-overlapping set of all of the segments.
             These segmentGroups correspond to the 'cables' of NeuroML v1.8.1, and map to/from NEURON sections.</notes>
                <member segment="750"/>
                <member segment="751"/>
                <member segment="752"/>
                <member segment="753"/>
            </segmentGroup>
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            <segmentGroup id="basal">
                <include segmentGroup="dend_0"/>
                <include segmentGroup="dend_1"/>
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                <inhomogeneousParameter id="PathLengthOver_basal" variable="p" metric="Path Length from root">
                    <proximal translationStart="0.000000e+00"/>
                </inhomogeneousParameter>
            </segmentGroup>
            <segmentGroup id="apical">
                <include segmentGroup="apic_0"/>
                <include segmentGroup="apic_1"/>
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                <inhomogeneousParameter id="PathLengthOver_apical" variable="p" metric="Path Length from root">
                    <proximal translationStart="0.000000e+00"/>
                </inhomogeneousParameter>
            </segmentGroup>
            <segmentGroup id="axonal">
                <include segmentGroup="axon_0"/>
                <include segmentGroup="axon_1"/>
            </segmentGroup>
            <segmentGroup id="somatic">
                <include segmentGroup="soma_0"/>
            </segmentGroup>
        </morphology>
        <biophysicalProperties id="biophys">
            <membraneProperties>
                <channelDensity id="all_g_pas" ionChannel="pas" condDensity="3e-5 S_per_cm2" erev="-75 mV" ion="non_specific"/>
                <channelDensity id="basal_gIhbar_Ih" ionChannel="Ih" condDensity="8e-05 S_per_cm2" erev="-45.0 mV" segmentGroup="basal" ion="hcn"/>
                <channelDensity id="apical_gNaTs2_tbar_NaTs2_t" ionChannel="NaTs2_t" condDensity="0.012009 S_per_cm2" erev="50.0 mV" segmentGroup="apical" ion="na"/>
                <channelDensity id="apical_gSKv3_1bar_SKv3_1" ionChannel="SKv3_1" condDensity="0.000513 S_per_cm2" erev="-85.0 mV" segmentGroup="apical" ion="k"/>
                <channelDensity id="apical_gImbar_Im" ionChannel="Im" condDensity="0.00074 S_per_cm2" erev="-85.0 mV" segmentGroup="apical" ion="k"/>
                <channelDensity id="axonal_gNaTa_tbar_NaTa_t" ionChannel="NaTa_t" condDensity="3.429725 S_per_cm2" erev="50.0 mV" segmentGroup="axonal" ion="na"/>
                <channelDensity id="axonal_gK_Tstbar_K_Tst" ionChannel="K_Tst" condDensity="0.001035 S_per_cm2" erev="-85.0 mV" segmentGroup="axonal" ion="k"/>
                <channelDensity id="axonal_gNap_Et2bar_Nap_Et2" ionChannel="Nap_Et2" condDensity="0.009803 S_per_cm2" erev="50.0 mV" segmentGroup="axonal" ion="na"/>
                <channelDensity id="axonal_gSK_E2bar_SK_E2" ionChannel="SK_E2" condDensity="0.008085 S_per_cm2" erev="-85.0 mV" segmentGroup="axonal" ion="k"/>
                <channelDensity id="axonal_gK_Pstbar_K_Pst" ionChannel="K_Pst" condDensity="0.959296 S_per_cm2" erev="-85.0 mV" segmentGroup="axonal" ion="k"/>
                <channelDensity id="axonal_gSKv3_1bar_SKv3_1" ionChannel="SKv3_1" condDensity="0.094971 S_per_cm2" erev="-85.0 mV" segmentGroup="axonal" ion="k"/>
                <channelDensity id="somatic_gSKv3_1bar_SKv3_1" ionChannel="SKv3_1" condDensity="0.102517 S_per_cm2" erev="-85.0 mV" segmentGroup="somatic" ion="k"/>
                <channelDensity id="somatic_gSK_E2bar_SK_E2" ionChannel="SK_E2" condDensity="0.099433 S_per_cm2" erev="-85.0 mV" segmentGroup="somatic" ion="k"/>
                <channelDensity id="somatic_gNaTs2_tbar_NaTs2_t" ionChannel="NaTs2_t" condDensity="0.926705 S_per_cm2" erev="50.0 mV" segmentGroup="somatic" ion="na"/>
                <channelDensity id="somatic_gIhbar_Ih" ionChannel="Ih" condDensity="8e-05 S_per_cm2" erev="-45.0 mV" segmentGroup="somatic" ion="hcn"/>
                <channelDensityNernst id="axonal_gCa_HVAbar_Ca_HVA" ionChannel="Ca_HVA" condDensity="0.000306 S_per_cm2" segmentGroup="axonal" ion="ca"/>
                <channelDensityNernst id="axonal_gCa_LVAstbar_Ca_LVAst" ionChannel="Ca_LVAst" condDensity="5e-05 S_per_cm2" segmentGroup="axonal" ion="ca"/>
                <channelDensityNernst id="somatic_gCa_HVAbar_Ca_HVA" ionChannel="Ca_HVA" condDensity="0.000374 S_per_cm2" segmentGroup="somatic" ion="ca"/>
                <channelDensityNernst id="somatic_gCa_LVAstbar_Ca_LVAst" ionChannel="Ca_LVAst" condDensity="0.000778 S_per_cm2" segmentGroup="somatic" ion="ca"/>
                <channelDensityNonUniform id="apical_gIhbar_Ih" ionChannel="Ih" erev="-45.0 mV" ion="hcn">
                    <variableParameter parameter="condDensity" segmentGroup="apical">
                        <inhomogeneousValue inhomogeneousParameter="PathLengthOver_apical" value="1e4 * ((-0.869600 + 2.087000*exp((p-0.000000)*0.003100))*0.000080)"/>
                    </variableParameter>
                </channelDensityNonUniform>
                <specificCapacitance value="2 uF_per_cm2" segmentGroup="basal"/>
                <specificCapacitance value="2 uF_per_cm2" segmentGroup="apical"/>
                <specificCapacitance value="1.0 uF_per_cm2" segmentGroup="axonal"/>
                <specificCapacitance value="1.0 uF_per_cm2" segmentGroup="somatic"/>
                <initMembPotential value="-80 mV"/>
            </membraneProperties>
            <intracellularProperties>
                <species segmentGroup="axonal" id="ca" concentrationModel="CaDynamics_E2_NML2__cADpyr_229_axonal" ion="ca" initialConcentration="5.0E-11 mol_per_cm3" initialExtConcentration="2.0E-6 mol_per_cm3"/>
                <species segmentGroup="somatic" id="ca" concentrationModel="CaDynamics_E2_NML2__cADpyr_229_somatic" ion="ca" initialConcentration="5.0E-11 mol_per_cm3" initialExtConcentration="2.0E-6 mol_per_cm3"/>
                <resistivity value="100 ohm_cm"/>
            </intracellularProperties>
        </biophysicalProperties>
    </cell>
    <izhikevich2007Cell id="RS" C="100 pF" v0="-60mV" k="0.7 nS_per_mV" vr="-60 mV" vt="-40 mV" vpeak="35 mV" a="0.03 per_ms" b="-2 nS" c="-50 mV" d="100 pA"/>
    <pulseGenerator id="pgIzh" delay="100ms" duration="300ms" amplitude="0.7nA"/>
    <pulseGenerator id="pgHH" delay="100ms" duration="300ms" amplitude="0.7nA"/>
    <pulseGenerator id="pgBBP" delay="100ms" duration="300ms" amplitude="0.7nA"/>
    <network id="IClamps">
        <population id="popIzh" component="RS" size="1" type="populationList">
            <instance id="0">
                <location x="0." y="0." z="0."/>
            </instance>
        </population>
        <population id="popHH" component="pyr_4_sym_soma" size="1" type="populationList">
            <instance id="0">
                <location x="0." y="0." z="100."/>
            </instance>
        </population>
        <population id="popBBP" component="cADpyr229_L23_PC_5ecbf9b163_0_0" size="1" type="populationList">
            <instance id="0">
                <location x="0." y="0." z="200."/>
            </instance>
        </population>
        <inputList id="Stim0" population="popIzh" component="pgIzh">
            <input id="0" target="../popIzh/0/RS" destination="synapses"/>
        </inputList>
        <inputList id="Stim1" population="popHH" component="pgHH">
            <input id="0" target="../popHH/0/pyr_4_sym_soma" destination="synapses"/>
        </inputList>
        <inputList id="Stim2" population="popBBP" component="pgBBP">
            <input id="0" target="../popBBP/0/cADpyr229_L23_PC_5ecbf9b163_0_0" destination="synapses"/>
        </inputList>
    </network>
    <ComponentType name="Ca_pyr_h_tau_tau" extends="baseVoltageDepTime">
        <Constant name="TIME_SCALE" dimension="time" value="1 s"/>
        <Constant name="VOLT_SCALE" dimension="voltage" value="1 V"/>
        <Dynamics>
            <DerivedVariable name="V" dimension="none" value="v / VOLT_SCALE"/>
            <DerivedVariable name="t" dimension="time" value="(0.2) * TIME_SCALE" exposure="t"/>
        </Dynamics>
    </ComponentType>
    <ComponentType name="Ca_pyr_h_inf_inf" extends="baseVoltageDepVariable">
        <Constant name="TIME_SCALE" dimension="time" value="1 s"/>
        <Constant name="VOLT_SCALE" dimension="voltage" value="1 V"/>
        <Dynamics>
            <DerivedVariable name="V" dimension="none" value="v / VOLT_SCALE"/>
            <ConditionalDerivedVariable name="x" dimension="none" exposure="x">
                <Case condition="V  .gt. ( -0.06 )" value=" (exp (-50*(V + 0.06))) "/>
                <Case value=" 1"/>
            </ConditionalDerivedVariable>
        </Dynamics>
    </ComponentType>
    <ComponentType name="Kahp_pyr_z_alpha_rate" extends="baseVoltageConcDepRate">
        <Constant name="TIME_SCALE" dimension="time" value="1 s"/>
        <Constant name="VOLT_SCALE" dimension="voltage" value="1 V"/>
        <Constant name="CONC_SCALE" dimension="concentration" value="1 mM"/>
        <Dynamics>
            <DerivedVariable name="V" dimension="none" value="v / VOLT_SCALE"/>
            <DerivedVariable name="ca_conc" dimension="none" value="caConc / CONC_SCALE"/>
            <ConditionalDerivedVariable name="r" dimension="per_time" exposure="r">
                <Case condition="ca_conc  .lt. ( 500.0 )" value="( 0.4 * ca_conc ) / TIME_SCALE"/>
                <Case value="( 200) / TIME_SCALE"/>
            </ConditionalDerivedVariable>
        </Dynamics>
    </ComponentType>
    <ComponentType name="Kahp_pyr_z_beta_rate" extends="baseVoltageConcDepRate">
        <Constant name="TIME_SCALE" dimension="time" value="1 s"/>
        <Constant name="VOLT_SCALE" dimension="voltage" value="1 V"/>
        <Constant name="CONC_SCALE" dimension="concentration" value="1 mM"/>
        <Dynamics>
            <DerivedVariable name="V" dimension="none" value="v / VOLT_SCALE"/>
            <DerivedVariable name="ca_conc" dimension="none" value="caConc / CONC_SCALE"/>
            <DerivedVariable name="r" dimension="per_time" value="(20) / TIME_SCALE" exposure="r"/>
        </Dynamics>
    </ComponentType>
    <ComponentType name="SKv3_1_m_tau_tau" extends="baseVoltageDepTime">
        <Constant name="TIME_SCALE" dimension="time" value="1 ms"/>
        <Constant name="VOLT_SCALE" dimension="voltage" value="1 mV"/>
        <Dynamics>
            <DerivedVariable name="V" dimension="none" value="v / VOLT_SCALE"/>
            <DerivedVariable name="t" dimension="time" value="(4/(1 + exp( (V+46.56) / (-44.140) ))) * TIME_SCALE" exposure="t"/>
        </Dynamics>
    </ComponentType>
    <ComponentType name="K_Tst_m_tau_tau" extends="baseVoltageDepTime">
        <Constant name="TIME_SCALE" dimension="time" value="1 ms"/>
        <Constant name="VOLT_SCALE" dimension="voltage" value="1 mV"/>
        <Dynamics>
            <DerivedVariable name="V" dimension="none" value="v / VOLT_SCALE"/>
            <DerivedVariable name="t" dimension="time" value="(0.34 + 0.92 * (exp (-1 *((V+81)/59)^2))) * TIME_SCALE" exposure="t"/>
        </Dynamics>
    </ComponentType>
    <ComponentType name="K_Tst_h_tau_tau" extends="baseVoltageDepTime">
        <Constant name="TIME_SCALE" dimension="time" value="1 ms"/>
        <Constant name="VOLT_SCALE" dimension="voltage" value="1 mV"/>
        <Dynamics>
            <DerivedVariable name="V" dimension="none" value="v / VOLT_SCALE"/>
            <DerivedVariable name="t" dimension="time" value="(8 + 49 * (exp (-1 * ((V+83)/23)^2))) * TIME_SCALE" exposure="t"/>
        </Dynamics>
    </ComponentType>
    <ComponentType name="Nap_Et2_m_tau_tau" extends="baseVoltageDepTime">
        <Constant name="TIME_SCALE" dimension="time" value="1 ms"/>
        <Constant name="VOLT_SCALE" dimension="voltage" value="1 mV"/>
        <Requirement name="alpha" dimension="per_time"/>
        <Requirement name="beta" dimension="per_time"/>
        <Dynamics>
            <DerivedVariable name="V" dimension="none" value="v / VOLT_SCALE"/>
            <DerivedVariable name="ALPHA" dimension="none" value="alpha * TIME_SCALE"/>
            <DerivedVariable name="BETA" dimension="none" value="beta * TIME_SCALE"/>
            <ConditionalDerivedVariable name="t" dimension="time" exposure="t">
                <Case condition="(ALPHA + BETA) .eq. 0" value="( 0 ) * TIME_SCALE"/>
                <Case condition="(ALPHA + BETA)  .gt. ( 0 )" value="( 6/( (ALPHA + BETA) ) ) * TIME_SCALE"/>
                <Case value="( 0) * TIME_SCALE"/>
            </ConditionalDerivedVariable>
        </Dynamics>
    </ComponentType>
    <ComponentType name="SK_E2_z_tau_tau" extends="baseVoltageConcDepTime">
        <Constant name="TIME_SCALE" dimension="time" value="1 ms"/>
        <Constant name="VOLT_SCALE" dimension="voltage" value="1 mV"/>
        <Constant name="CONC_SCALE" dimension="concentration" value="1 mol_per_cm3"/>
        <Dynamics>
            <DerivedVariable name="V" dimension="none" value="v / VOLT_SCALE"/>
            <DerivedVariable name="ca_conc" dimension="none" value="caConc / CONC_SCALE"/>
            <DerivedVariable name="t" dimension="time" value="(1) * TIME_SCALE" exposure="t"/>
        </Dynamics>
    </ComponentType>
    <ComponentType name="SK_E2_z_inf_inf" extends="baseVoltageConcDepVariable">
        <Constant name="TIME_SCALE" dimension="time" value="1 ms"/>
        <Constant name="VOLT_SCALE" dimension="voltage" value="1 mV"/>
        <Constant name="CONC_SCALE" dimension="concentration" value="1 mol_per_cm3"/>
        <Dynamics>
            <DerivedVariable name="V" dimension="none" value="v / VOLT_SCALE"/>
            <DerivedVariable name="ca_conc" dimension="none" value="caConc / CONC_SCALE"/>
            <DerivedVariable name="x" dimension="none" value="1/(1+(4.3e-10/ca_conc)^4.8)" exposure="x"/>
        </Dynamics>
    </ComponentType>
    <ComponentType name="K_Pst_m_tau_tau" extends="baseVoltageDepTime">
        <Constant name="TIME_SCALE" dimension="time" value="1 ms"/>
        <Constant name="VOLT_SCALE" dimension="voltage" value="1 mV"/>
        <Dynamics>
            <DerivedVariable name="V" dimension="none" value="v / VOLT_SCALE"/>
            <ConditionalDerivedVariable name="t" dimension="time" exposure="t">
                <Case condition="V  .lt. ( -60 )" value="( (1.25 + 175.03 * (exp ((V+10) * 0.026))) ) * TIME_SCALE"/>
                <Case value="( (1.25 + 13 * (exp ((V+10) * -0.026)))) * TIME_SCALE"/>
            </ConditionalDerivedVariable>
        </Dynamics>
    </ComponentType>
    <ComponentType name="K_Pst_h_tau_tau" extends="baseVoltageDepTime">
        <Constant name="TIME_SCALE" dimension="time" value="1 ms"/>
        <Constant name="VOLT_SCALE" dimension="voltage" value="1 mV"/>
        <Dynamics>
            <DerivedVariable name="V" dimension="none" value="v / VOLT_SCALE"/>
            <DerivedVariable name="t" dimension="time" value="(360 + (1010 + 24*(V+65)) * (exp (-1 *((V+85)/48)*((V+85)/48)))) * TIME_SCALE" exposure="t"/>
        </Dynamics>
    </ComponentType>

    <ComponentType name="Ca_LVAst_m_tau_tau" extends="baseVoltageDepTime">
        <Constant name="TIME_SCALE" dimension="time" value="1 ms"/>
        <Constant name="VOLT_SCALE" dimension="voltage" value="1 mV"/>
        <Dynamics>
            <DerivedVariable name="V" dimension="none" value="v / VOLT_SCALE"/>
            <DerivedVariable name="t" dimension="time" value="(5 + 20 / (1 + (exp ((V+35)/5) ))) * TIME_SCALE" exposure="t"/>
        </Dynamics>
    </ComponentType>
    <ComponentType name="Ca_LVAst_h_tau_tau" extends="baseVoltageDepTime">
        <Constant name="TIME_SCALE" dimension="time" value="1 ms"/>
        <Constant name="VOLT_SCALE" dimension="voltage" value="1 mV"/>
        <Dynamics>
            <DerivedVariable name="V" dimension="none" value="v / VOLT_SCALE"/>
            <DerivedVariable name="t" dimension="time" value="(20 + 50 / (1 + (exp ((V+50)/7) ))) * TIME_SCALE" exposure="t"/>
        </Dynamics>
    </ComponentType>
</neuroml>
