<Lems>

    <!--

        This LEMS file has been automatically generated using PyNeuroML v0.2.1 (libNeuroML v0.2.21)

     -->

    <!-- Specify which component to run -->
    <Target component="Sim_ACNet"/>

    <!-- Include core NeuroML2 ComponentType definitions -->
    <Include file="Cells.xml"/>
    <Include file="Networks.xml"/>
    <Include file="Simulation.xml"/>

    <Include file="ACNet/pyr_4_sym.cell.nml"/>
    <Include file="ACNet/Ca_conc.nml"/>
    <Include file="ACNet/Ca_pyr.channel.nml"/>
    <Include file="ACNet/Kahp_pyr.channel.nml"/>
    <Include file="ACNet/Kdr_pyr.channel.nml"/>
    <Include file="ACNet/LeakConductance_pyr.channel.nml"/>
    <Include file="ACNet/Na_pyr.channel.nml"/>
    <Include file="ACNet/bask.cell.nml"/>
    <Include file="ACNet/Kdr_bask.channel.nml"/>
    <Include file="ACNet/LeakConductance_bask.channel.nml"/>
    <Include file="ACNet/Na_bask.channel.nml"/>
    <Include file="ACNet.net.nml"/>

    <Simulation id="Sim_ACNet" length="1000ms" step="0.025ms" target="ACNet" seed="12345">  <!-- Note seed: ensures same random numbers used every run -->

        <Display id="DispPop__pop_pyr" title="Membrane potentials of cells in pop_pyr" timeScale="1ms" xmin="-100.0" xmax="1100.0" ymin="-90" ymax="50">
            <Line id="pop_pyr[0]: v" quantity="pop_pyr/0/pyr_4_sym/v" scale="1mV" color="#6aa799" timeScale="1ms"/>
            <Line id="pop_pyr[1]: v" quantity="pop_pyr/1/pyr_4_sym/v" scale="1mV" color="#029a72" timeScale="1ms"/>
            <Line id="pop_pyr[2]: v" quantity="pop_pyr/2/pyr_4_sym/v" scale="1mV" color="#d340bb" timeScale="1ms"/>
            <Line id="pop_pyr[3]: v" quantity="pop_pyr/3/pyr_4_sym/v" scale="1mV" color="#4c73a9" timeScale="1ms"/>
            <Line id="pop_pyr[4]: v" quantity="pop_pyr/4/pyr_4_sym/v" scale="1mV" color="#5e503a" timeScale="1ms"/>
            <Line id="pop_pyr[5]: v" quantity="pop_pyr/5/pyr_4_sym/v" scale="1mV" color="#3193ca" timeScale="1ms"/>
            <Line id="pop_pyr[6]: v" quantity="pop_pyr/6/pyr_4_sym/v" scale="1mV" color="#90e5e9" timeScale="1ms"/>
            <Line id="pop_pyr[7]: v" quantity="pop_pyr/7/pyr_4_sym/v" scale="1mV" color="#29645f" timeScale="1ms"/>
            <Line id="pop_pyr[8]: v" quantity="pop_pyr/8/pyr_4_sym/v" scale="1mV" color="#1fcff4" timeScale="1ms"/>
            <Line id="pop_pyr[9]: v" quantity="pop_pyr/9/pyr_4_sym/v" scale="1mV" color="#6ed4e9" timeScale="1ms"/>
            <Line id="pop_pyr[10]: v" quantity="pop_pyr/10/pyr_4_sym/v" scale="1mV" color="#8fe460" timeScale="1ms"/>
            <Line id="pop_pyr[11]: v" quantity="pop_pyr/11/pyr_4_sym/v" scale="1mV" color="#2ca1c7" timeScale="1ms"/>
            <Line id="pop_pyr[12]: v" quantity="pop_pyr/12/pyr_4_sym/v" scale="1mV" color="#8d9fe5" timeScale="1ms"/>
            <Line id="pop_pyr[13]: v" quantity="pop_pyr/13/pyr_4_sym/v" scale="1mV" color="#5adad1" timeScale="1ms"/>
            <Line id="pop_pyr[14]: v" quantity="pop_pyr/14/pyr_4_sym/v" scale="1mV" color="#f543bb" timeScale="1ms"/>
            <Line id="pop_pyr[15]: v" quantity="pop_pyr/15/pyr_4_sym/v" scale="1mV" color="#175f0c" timeScale="1ms"/>
            <Line id="pop_pyr[16]: v" quantity="pop_pyr/16/pyr_4_sym/v" scale="1mV" color="#fa8826" timeScale="1ms"/>
            <Line id="pop_pyr[17]: v" quantity="pop_pyr/17/pyr_4_sym/v" scale="1mV" color="#6980a8" timeScale="1ms"/>
            <Line id="pop_pyr[18]: v" quantity="pop_pyr/18/pyr_4_sym/v" scale="1mV" color="#8101e8" timeScale="1ms"/>
            <Line id="pop_pyr[19]: v" quantity="pop_pyr/19/pyr_4_sym/v" scale="1mV" color="#25ece8" timeScale="1ms"/>
            <Line id="pop_pyr[20]: v" quantity="pop_pyr/20/pyr_4_sym/v" scale="1mV" color="#b80e3b" timeScale="1ms"/>
            <Line id="pop_pyr[21]: v" quantity="pop_pyr/21/pyr_4_sym/v" scale="1mV" color="#30a1f6" timeScale="1ms"/>
            <Line id="pop_pyr[22]: v" quantity="pop_pyr/22/pyr_4_sym/v" scale="1mV" color="#577081" timeScale="1ms"/>
            <Line id="pop_pyr[23]: v" quantity="pop_pyr/23/pyr_4_sym/v" scale="1mV" color="#06057c" timeScale="1ms"/>
            <Line id="pop_pyr[24]: v" quantity="pop_pyr/24/pyr_4_sym/v" scale="1mV" color="#56eaa3" timeScale="1ms"/>
            <Line id="pop_pyr[25]: v" quantity="pop_pyr/25/pyr_4_sym/v" scale="1mV" color="#f7acee" timeScale="1ms"/>
            <Line id="pop_pyr[26]: v" quantity="pop_pyr/26/pyr_4_sym/v" scale="1mV" color="#fa9289" timeScale="1ms"/>
            <Line id="pop_pyr[27]: v" quantity="pop_pyr/27/pyr_4_sym/v" scale="1mV" color="#be9985" timeScale="1ms"/>
            <Line id="pop_pyr[28]: v" quantity="pop_pyr/28/pyr_4_sym/v" scale="1mV" color="#00e266" timeScale="1ms"/>
            <Line id="pop_pyr[29]: v" quantity="pop_pyr/29/pyr_4_sym/v" scale="1mV" color="#f0b378" timeScale="1ms"/>
            <Line id="pop_pyr[30]: v" quantity="pop_pyr/30/pyr_4_sym/v" scale="1mV" color="#deea95" timeScale="1ms"/>
            <Line id="pop_pyr[31]: v" quantity="pop_pyr/31/pyr_4_sym/v" scale="1mV" color="#c55566" timeScale="1ms"/>
            <Line id="pop_pyr[32]: v" quantity="pop_pyr/32/pyr_4_sym/v" scale="1mV" color="#2dcaab" timeScale="1ms"/>
            <Line id="pop_pyr[33]: v" quantity="pop_pyr/33/pyr_4_sym/v" scale="1mV" color="#1978ce" timeScale="1ms"/>
            <Line id="pop_pyr[34]: v" quantity="pop_pyr/34/pyr_4_sym/v" scale="1mV" color="#6a1ecc" timeScale="1ms"/>
            <Line id="pop_pyr[35]: v" quantity="pop_pyr/35/pyr_4_sym/v" scale="1mV" color="#e2b284" timeScale="1ms"/>
            <Line id="pop_pyr[36]: v" quantity="pop_pyr/36/pyr_4_sym/v" scale="1mV" color="#93fd72" timeScale="1ms"/>
            <Line id="pop_pyr[37]: v" quantity="pop_pyr/37/pyr_4_sym/v" scale="1mV" color="#bc90a6" timeScale="1ms"/>
            <Line id="pop_pyr[38]: v" quantity="pop_pyr/38/pyr_4_sym/v" scale="1mV" color="#3b8d0e" timeScale="1ms"/>
            <Line id="pop_pyr[39]: v" quantity="pop_pyr/39/pyr_4_sym/v" scale="1mV" color="#860a7d" timeScale="1ms"/>
            <Line id="pop_pyr[40]: v" quantity="pop_pyr/40/pyr_4_sym/v" scale="1mV" color="#b59a59" timeScale="1ms"/>
            <Line id="pop_pyr[41]: v" quantity="pop_pyr/41/pyr_4_sym/v" scale="1mV" color="#d32851" timeScale="1ms"/>
            <Line id="pop_pyr[42]: v" quantity="pop_pyr/42/pyr_4_sym/v" scale="1mV" color="#ce9fb6" timeScale="1ms"/>
            <Line id="pop_pyr[43]: v" quantity="pop_pyr/43/pyr_4_sym/v" scale="1mV" color="#3b788b" timeScale="1ms"/>
            <Line id="pop_pyr[44]: v" quantity="pop_pyr/44/pyr_4_sym/v" scale="1mV" color="#df8960" timeScale="1ms"/>
            <Line id="pop_pyr[45]: v" quantity="pop_pyr/45/pyr_4_sym/v" scale="1mV" color="#3764b5" timeScale="1ms"/>
            <Line id="pop_pyr[46]: v" quantity="pop_pyr/46/pyr_4_sym/v" scale="1mV" color="#cd4944" timeScale="1ms"/>
            <Line id="pop_pyr[47]: v" quantity="pop_pyr/47/pyr_4_sym/v" scale="1mV" color="#8e1a11" timeScale="1ms"/>
        </Display>

        <Display id="DispPop__pop_bask" title="Membrane potentials of cells in pop_bask" timeScale="1ms" xmin="-100.0" xmax="1100.0" ymin="-90" ymax="50">
            <Line id="pop_bask[0]: v" quantity="pop_bask/0/bask/v" scale="1mV" color="#2f9272" timeScale="1ms"/>
            <Line id="pop_bask[1]: v" quantity="pop_bask/1/bask/v" scale="1mV" color="#96af0d" timeScale="1ms"/>
            <Line id="pop_bask[2]: v" quantity="pop_bask/2/bask/v" scale="1mV" color="#84ab56" timeScale="1ms"/>
            <Line id="pop_bask[3]: v" quantity="pop_bask/3/bask/v" scale="1mV" color="#f56ae7" timeScale="1ms"/>
            <Line id="pop_bask[4]: v" quantity="pop_bask/4/bask/v" scale="1mV" color="#0aa250" timeScale="1ms"/>
            <Line id="pop_bask[5]: v" quantity="pop_bask/5/bask/v" scale="1mV" color="#2a04f7" timeScale="1ms"/>
            <Line id="pop_bask[6]: v" quantity="pop_bask/6/bask/v" scale="1mV" color="#fbb911" timeScale="1ms"/>
            <Line id="pop_bask[7]: v" quantity="pop_bask/7/bask/v" scale="1mV" color="#d50b61" timeScale="1ms"/>
            <Line id="pop_bask[8]: v" quantity="pop_bask/8/bask/v" scale="1mV" color="#267841" timeScale="1ms"/>
            <Line id="pop_bask[9]: v" quantity="pop_bask/9/bask/v" scale="1mV" color="#3aa725" timeScale="1ms"/>
            <Line id="pop_bask[10]: v" quantity="pop_bask/10/bask/v" scale="1mV" color="#8a04f7" timeScale="1ms"/>
            <Line id="pop_bask[11]: v" quantity="pop_bask/11/bask/v" scale="1mV" color="#282fe5" timeScale="1ms"/>
        </Display>

        <OutputFile id="Volts_file__pop_pyr" fileName="Sim_ACNet.pop_pyr.v.dat">
            <OutputColumn id="v_pop_pyr_0_pyr_4_sym_v" quantity="pop_pyr/0/pyr_4_sym/v"/>
            <OutputColumn id="v_pop_pyr_1_pyr_4_sym_v" quantity="pop_pyr/1/pyr_4_sym/v"/>
            <OutputColumn id="v_pop_pyr_2_pyr_4_sym_v" quantity="pop_pyr/2/pyr_4_sym/v"/>
            <OutputColumn id="v_pop_pyr_3_pyr_4_sym_v" quantity="pop_pyr/3/pyr_4_sym/v"/>
            <OutputColumn id="v_pop_pyr_4_pyr_4_sym_v" quantity="pop_pyr/4/pyr_4_sym/v"/>
            <OutputColumn id="v_pop_pyr_5_pyr_4_sym_v" quantity="pop_pyr/5/pyr_4_sym/v"/>
            <OutputColumn id="v_pop_pyr_6_pyr_4_sym_v" quantity="pop_pyr/6/pyr_4_sym/v"/>
            <OutputColumn id="v_pop_pyr_7_pyr_4_sym_v" quantity="pop_pyr/7/pyr_4_sym/v"/>
            <OutputColumn id="v_pop_pyr_8_pyr_4_sym_v" quantity="pop_pyr/8/pyr_4_sym/v"/>
            <OutputColumn id="v_pop_pyr_9_pyr_4_sym_v" quantity="pop_pyr/9/pyr_4_sym/v"/>
            <OutputColumn id="v_pop_pyr_10_pyr_4_sym_v" quantity="pop_pyr/10/pyr_4_sym/v"/>
            <OutputColumn id="v_pop_pyr_11_pyr_4_sym_v" quantity="pop_pyr/11/pyr_4_sym/v"/>
            <OutputColumn id="v_pop_pyr_12_pyr_4_sym_v" quantity="pop_pyr/12/pyr_4_sym/v"/>
            <OutputColumn id="v_pop_pyr_13_pyr_4_sym_v" quantity="pop_pyr/13/pyr_4_sym/v"/>
            <OutputColumn id="v_pop_pyr_14_pyr_4_sym_v" quantity="pop_pyr/14/pyr_4_sym/v"/>
            <OutputColumn id="v_pop_pyr_15_pyr_4_sym_v" quantity="pop_pyr/15/pyr_4_sym/v"/>
            <OutputColumn id="v_pop_pyr_16_pyr_4_sym_v" quantity="pop_pyr/16/pyr_4_sym/v"/>
            <OutputColumn id="v_pop_pyr_17_pyr_4_sym_v" quantity="pop_pyr/17/pyr_4_sym/v"/>
            <OutputColumn id="v_pop_pyr_18_pyr_4_sym_v" quantity="pop_pyr/18/pyr_4_sym/v"/>
            <OutputColumn id="v_pop_pyr_19_pyr_4_sym_v" quantity="pop_pyr/19/pyr_4_sym/v"/>
            <OutputColumn id="v_pop_pyr_20_pyr_4_sym_v" quantity="pop_pyr/20/pyr_4_sym/v"/>
            <OutputColumn id="v_pop_pyr_21_pyr_4_sym_v" quantity="pop_pyr/21/pyr_4_sym/v"/>
            <OutputColumn id="v_pop_pyr_22_pyr_4_sym_v" quantity="pop_pyr/22/pyr_4_sym/v"/>
            <OutputColumn id="v_pop_pyr_23_pyr_4_sym_v" quantity="pop_pyr/23/pyr_4_sym/v"/>
            <OutputColumn id="v_pop_pyr_24_pyr_4_sym_v" quantity="pop_pyr/24/pyr_4_sym/v"/>
            <OutputColumn id="v_pop_pyr_25_pyr_4_sym_v" quantity="pop_pyr/25/pyr_4_sym/v"/>
            <OutputColumn id="v_pop_pyr_26_pyr_4_sym_v" quantity="pop_pyr/26/pyr_4_sym/v"/>
            <OutputColumn id="v_pop_pyr_27_pyr_4_sym_v" quantity="pop_pyr/27/pyr_4_sym/v"/>
            <OutputColumn id="v_pop_pyr_28_pyr_4_sym_v" quantity="pop_pyr/28/pyr_4_sym/v"/>
            <OutputColumn id="v_pop_pyr_29_pyr_4_sym_v" quantity="pop_pyr/29/pyr_4_sym/v"/>
            <OutputColumn id="v_pop_pyr_30_pyr_4_sym_v" quantity="pop_pyr/30/pyr_4_sym/v"/>
            <OutputColumn id="v_pop_pyr_31_pyr_4_sym_v" quantity="pop_pyr/31/pyr_4_sym/v"/>
            <OutputColumn id="v_pop_pyr_32_pyr_4_sym_v" quantity="pop_pyr/32/pyr_4_sym/v"/>
            <OutputColumn id="v_pop_pyr_33_pyr_4_sym_v" quantity="pop_pyr/33/pyr_4_sym/v"/>
            <OutputColumn id="v_pop_pyr_34_pyr_4_sym_v" quantity="pop_pyr/34/pyr_4_sym/v"/>
            <OutputColumn id="v_pop_pyr_35_pyr_4_sym_v" quantity="pop_pyr/35/pyr_4_sym/v"/>
            <OutputColumn id="v_pop_pyr_36_pyr_4_sym_v" quantity="pop_pyr/36/pyr_4_sym/v"/>
            <OutputColumn id="v_pop_pyr_37_pyr_4_sym_v" quantity="pop_pyr/37/pyr_4_sym/v"/>
            <OutputColumn id="v_pop_pyr_38_pyr_4_sym_v" quantity="pop_pyr/38/pyr_4_sym/v"/>
            <OutputColumn id="v_pop_pyr_39_pyr_4_sym_v" quantity="pop_pyr/39/pyr_4_sym/v"/>
            <OutputColumn id="v_pop_pyr_40_pyr_4_sym_v" quantity="pop_pyr/40/pyr_4_sym/v"/>
            <OutputColumn id="v_pop_pyr_41_pyr_4_sym_v" quantity="pop_pyr/41/pyr_4_sym/v"/>
            <OutputColumn id="v_pop_pyr_42_pyr_4_sym_v" quantity="pop_pyr/42/pyr_4_sym/v"/>
            <OutputColumn id="v_pop_pyr_43_pyr_4_sym_v" quantity="pop_pyr/43/pyr_4_sym/v"/>
            <OutputColumn id="v_pop_pyr_44_pyr_4_sym_v" quantity="pop_pyr/44/pyr_4_sym/v"/>
            <OutputColumn id="v_pop_pyr_45_pyr_4_sym_v" quantity="pop_pyr/45/pyr_4_sym/v"/>
            <OutputColumn id="v_pop_pyr_46_pyr_4_sym_v" quantity="pop_pyr/46/pyr_4_sym/v"/>
            <OutputColumn id="v_pop_pyr_47_pyr_4_sym_v" quantity="pop_pyr/47/pyr_4_sym/v"/>
        </OutputFile>

        <OutputFile id="Volts_file__pop_bask" fileName="Sim_ACNet.pop_bask.v.dat">
            <OutputColumn id="v_pop_bask_0_bask_v" quantity="pop_bask/0/bask/v"/>
            <OutputColumn id="v_pop_bask_1_bask_v" quantity="pop_bask/1/bask/v"/>
            <OutputColumn id="v_pop_bask_2_bask_v" quantity="pop_bask/2/bask/v"/>
            <OutputColumn id="v_pop_bask_3_bask_v" quantity="pop_bask/3/bask/v"/>
            <OutputColumn id="v_pop_bask_4_bask_v" quantity="pop_bask/4/bask/v"/>
            <OutputColumn id="v_pop_bask_5_bask_v" quantity="pop_bask/5/bask/v"/>
            <OutputColumn id="v_pop_bask_6_bask_v" quantity="pop_bask/6/bask/v"/>
            <OutputColumn id="v_pop_bask_7_bask_v" quantity="pop_bask/7/bask/v"/>
            <OutputColumn id="v_pop_bask_8_bask_v" quantity="pop_bask/8/bask/v"/>
            <OutputColumn id="v_pop_bask_9_bask_v" quantity="pop_bask/9/bask/v"/>
            <OutputColumn id="v_pop_bask_10_bask_v" quantity="pop_bask/10/bask/v"/>
            <OutputColumn id="v_pop_bask_11_bask_v" quantity="pop_bask/11/bask/v"/>
        </OutputFile>

    </Simulation>

</Lems>
