<Lems>

    <!--

        This LEMS file has been automatically generated using PyNeuroML v0.2.13 (libNeuroML v0.2.32)

     -->

    <!-- Specify which component to run -->
    <Target component="Sim_Balanced_24cells_336conns"/>

    <!-- Include core NeuroML2 ComponentType definitions -->
    <Include file="Cells.xml"/>
    <Include file="Networks.xml"/>
    <Include file="Simulation.xml"/>

    <Include file="Balanced/HH_477127614.cell.nml"/>
    <Include file="Balanced/IMchan.channel.nml"/>
    <Include file="Balanced/Kd.channel.nml"/>
    <Include file="Balanced/Leak.channel.nml"/>
    <Include file="Balanced/Na.channel.nml"/>
    <Include file="Balanced/HH_476686112.cell.nml"/>
    <Include file="Balanced_24cells_336conns.net.nml"/>

    <Simulation id="Sim_Balanced_24cells_336conns" length="1000ms" step="0.025ms" target="Balanced_24cells_336conns" seed="12345">  <!-- Note seed: ensures same random numbers used every run -->

        <Display id="popInh" title="Plots of popInh" timeScale="1ms" xmin="-100.0" xmax="1100.0" ymin="-80" ymax="40">
            <Line id="popInh_0_HH_476686112_v" quantity="popInh/0/HH_476686112/v" scale="1mV" color="#6aa799" timeScale="1ms"/>
            <Line id="popInh_1_HH_476686112_v" quantity="popInh/1/HH_476686112/v" scale="1mV" color="#029a72" timeScale="1ms"/>
            <Line id="popInh_2_HH_476686112_v" quantity="popInh/2/HH_476686112/v" scale="1mV" color="#d340bb" timeScale="1ms"/>
            <Line id="popInh_3_HH_476686112_v" quantity="popInh/3/HH_476686112/v" scale="1mV" color="#4c73a9" timeScale="1ms"/>
            <Line id="popInh_4_HH_476686112_v" quantity="popInh/4/HH_476686112/v" scale="1mV" color="#5e503a" timeScale="1ms"/>
        </Display>

        <Display id="popExc" title="Plots of popExc" timeScale="1ms" xmin="-100.0" xmax="1100.0" ymin="-80" ymax="40">
            <Line id="popExc_0_HH_477127614_v" quantity="popExc/0/HH_477127614/v" scale="1mV" color="#3193ca" timeScale="1ms"/>
            <Line id="popExc_1_HH_477127614_v" quantity="popExc/1/HH_477127614/v" scale="1mV" color="#90e5e9" timeScale="1ms"/>
            <Line id="popExc_2_HH_477127614_v" quantity="popExc/2/HH_477127614/v" scale="1mV" color="#29645f" timeScale="1ms"/>
            <Line id="popExc_3_HH_477127614_v" quantity="popExc/3/HH_477127614/v" scale="1mV" color="#1fcff4" timeScale="1ms"/>
            <Line id="popExc_4_HH_477127614_v" quantity="popExc/4/HH_477127614/v" scale="1mV" color="#6ed4e9" timeScale="1ms"/>
        </Display>

        <OutputFile id="popInh_v_dat" fileName="popInh_v.dat">
            <OutputColumn id="popInh_0_HH_476686112_v" quantity="popInh/0/HH_476686112/v"/>
            <OutputColumn id="popInh_1_HH_476686112_v" quantity="popInh/1/HH_476686112/v"/>
            <OutputColumn id="popInh_2_HH_476686112_v" quantity="popInh/2/HH_476686112/v"/>
            <OutputColumn id="popInh_3_HH_476686112_v" quantity="popInh/3/HH_476686112/v"/>
            <OutputColumn id="popInh_4_HH_476686112_v" quantity="popInh/4/HH_476686112/v"/>
        </OutputFile>

        <OutputFile id="popExc_v_dat" fileName="popExc_v.dat">
            <OutputColumn id="popExc_0_HH_477127614_v" quantity="popExc/0/HH_477127614/v"/>
            <OutputColumn id="popExc_1_HH_477127614_v" quantity="popExc/1/HH_477127614/v"/>
            <OutputColumn id="popExc_2_HH_477127614_v" quantity="popExc/2/HH_477127614/v"/>
            <OutputColumn id="popExc_3_HH_477127614_v" quantity="popExc/3/HH_477127614/v"/>
            <OutputColumn id="popExc_4_HH_477127614_v" quantity="popExc/4/HH_477127614/v"/>
        </OutputFile>

        <EventOutputFile id="Spikes_file__popExc" fileName="Sim_Balanced_24cells_336conns.popExc.spikes" format="ID_TIME">
            <EventSelection id="0" select="popExc/0/HH_477127614" eventPort="spike"/>
            <EventSelection id="1" select="popExc/1/HH_477127614" eventPort="spike"/>
            <EventSelection id="2" select="popExc/2/HH_477127614" eventPort="spike"/>
            <EventSelection id="3" select="popExc/3/HH_477127614" eventPort="spike"/>
            <EventSelection id="4" select="popExc/4/HH_477127614" eventPort="spike"/>
            <EventSelection id="5" select="popExc/5/HH_477127614" eventPort="spike"/>
            <EventSelection id="6" select="popExc/6/HH_477127614" eventPort="spike"/>
            <EventSelection id="7" select="popExc/7/HH_477127614" eventPort="spike"/>
            <EventSelection id="8" select="popExc/8/HH_477127614" eventPort="spike"/>
            <EventSelection id="9" select="popExc/9/HH_477127614" eventPort="spike"/>
            <EventSelection id="10" select="popExc/10/HH_477127614" eventPort="spike"/>
            <EventSelection id="11" select="popExc/11/HH_477127614" eventPort="spike"/>
            <EventSelection id="12" select="popExc/12/HH_477127614" eventPort="spike"/>
            <EventSelection id="13" select="popExc/13/HH_477127614" eventPort="spike"/>
            <EventSelection id="14" select="popExc/14/HH_477127614" eventPort="spike"/>
            <EventSelection id="15" select="popExc/15/HH_477127614" eventPort="spike"/>
        </EventOutputFile>

        <EventOutputFile id="Spikes_file__popInh" fileName="Sim_Balanced_24cells_336conns.popInh.spikes" format="ID_TIME">
            <EventSelection id="0" select="popInh/0/HH_476686112" eventPort="spike"/>
            <EventSelection id="1" select="popInh/1/HH_476686112" eventPort="spike"/>
            <EventSelection id="2" select="popInh/2/HH_476686112" eventPort="spike"/>
            <EventSelection id="3" select="popInh/3/HH_476686112" eventPort="spike"/>
            <EventSelection id="4" select="popInh/4/HH_476686112" eventPort="spike"/>
            <EventSelection id="5" select="popInh/5/HH_476686112" eventPort="spike"/>
            <EventSelection id="6" select="popInh/6/HH_476686112" eventPort="spike"/>
            <EventSelection id="7" select="popInh/7/HH_476686112" eventPort="spike"/>
        </EventOutputFile>

    </Simulation>

</Lems>
