<Lems>

    <!--

        This LEMS file has been automatically generated using PyNeuroML v0.1.9 (libNeuroML v0.2.12)

     -->

    <!-- Specify which component to run -->
    <Target component="Sim_Deterministic"/>

    <!-- Include core NeuroML2 ComponentType definitions -->
    <Include file="Cells.xml"/>
    <Include file="Networks.xml"/>
    <Include file="Simulation.xml"/>

    <Include file="Deterministic.net.nml"/>
    <Include file="../NeuroML2/prototypes/izhikevich/RS.cell.nml"/>
    <Include file="../NeuroML2/prototypes/iaf/iaf.cell.nml"/>
    <Include file="../NeuroML2/prototypes/acnet2/pyr_4_sym_soma.cell.nml"/>
    <Include file="Ca_conc.nml"/>
    <Include file="Ca_pyr.channel.nml"/>
    <Include file="Kahp_pyr.channel.nml"/>
    <Include file="Kdr_pyr.channel.nml"/>
    <Include file="LeakConductance_pyr.channel.nml"/>
    <Include file="Na_pyr.channel.nml"/>
    <Include file="../NeuroML2/prototypes/izhikevich/RS.cell.nml"/>
    <Include file="../NeuroML2/prototypes/iaf/iaf.cell.nml"/>
    <Include file="../NeuroML2/prototypes/acnet2/pyr_4_sym_soma.cell.nml"/>
    <Include file="Ca_conc.nml"/>
    <Include file="Ca_pyr.channel.nml"/>
    <Include file="Kahp_pyr.channel.nml"/>
    <Include file="Kdr_pyr.channel.nml"/>
    <Include file="LeakConductance_pyr.channel.nml"/>
    <Include file="Na_pyr.channel.nml"/>

    <Simulation id="Sim_Deterministic" length="500ms" step="0.005ms" target="Deterministic" seed="12345">  <!-- Note seed: ensures same random numbers used every run -->

        <Display id="display_pop_iaf" title="Voltages pop_iaf" timeScale="1ms" xmin="-50.0" xmax="550.0" ymin="-80" ymax="40">
            <Line id="pop_iaf 0: Vm" quantity="pop_iaf/0/iaf/v" scale="1mV" color="#2d665a" timeScale="1ms"/>
            <Line id="pop_iaf 1: Vm" quantity="pop_iaf/1/iaf/v" scale="1mV" color="#2791ee" timeScale="1ms"/>
            <Line id="pop_iaf 2: Vm" quantity="pop_iaf/2/iaf/v" scale="1mV" color="#f46871" timeScale="1ms"/>
            <Line id="pop_iaf 3: Vm" quantity="pop_iaf/3/iaf/v" scale="1mV" color="#2790ae" timeScale="1ms"/>
            <Line id="pop_iaf 4: Vm" quantity="pop_iaf/4/iaf/v" scale="1mV" color="#d579c4" timeScale="1ms"/>
        </Display>

        <Display id="display_pop_rs" title="Voltages pop_rs" timeScale="1ms" xmin="-50.0" xmax="550.0" ymin="-80" ymax="40">
            <Line id="pop_rs 0: Vm" quantity="pop_rs/0/RS/v" scale="1mV" color="#0a8317" timeScale="1ms"/>
            <Line id="pop_rs 1: Vm" quantity="pop_rs/1/RS/v" scale="1mV" color="#62dcec" timeScale="1ms"/>
            <Line id="pop_rs 2: Vm" quantity="pop_rs/2/RS/v" scale="1mV" color="#597ee1" timeScale="1ms"/>
            <Line id="pop_rs 3: Vm" quantity="pop_rs/3/RS/v" scale="1mV" color="#577a29" timeScale="1ms"/>
            <Line id="pop_rs 4: Vm" quantity="pop_rs/4/RS/v" scale="1mV" color="#d103b9" timeScale="1ms"/>
        </Display>

        <OutputFile id="Volts_file_pop_iaf" fileName="v_pop_iaf.dat">
            <OutputColumn id="v_0" quantity="pop_iaf/0/iaf/v"/>
            <OutputColumn id="v_1" quantity="pop_iaf/1/iaf/v"/>
            <OutputColumn id="v_2" quantity="pop_iaf/2/iaf/v"/>
            <OutputColumn id="v_3" quantity="pop_iaf/3/iaf/v"/>
            <OutputColumn id="v_4" quantity="pop_iaf/4/iaf/v"/>
        </OutputFile>

        <OutputFile id="Volts_file_pop_rs" fileName="v_pop_rs.dat">
            <OutputColumn id="v_0" quantity="pop_rs/0/RS/v"/>
            <OutputColumn id="v_1" quantity="pop_rs/1/RS/v"/>
            <OutputColumn id="v_2" quantity="pop_rs/2/RS/v"/>
            <OutputColumn id="v_3" quantity="pop_rs/3/RS/v"/>
            <OutputColumn id="v_4" quantity="pop_rs/4/RS/v"/>
        </OutputFile>

    </Simulation>

</Lems>
