<Lems>

    <!--

        This LEMS file has been automatically generated using PyNeuroML v1.3.14 (libNeuroML v0.6.6)

     -->

    <!-- Specify which component to run -->
    <Target component="Sim_GapJunctions"/>

    <!-- Include core NeuroML2 ComponentType definitions -->
    <Include file="Cells.xml"/>
    <Include file="Networks.xml"/>
    <Include file="Simulation.xml"/>

    <Include file="GapJunctions/pyr_4_sym.cell.nml"/>
    <Include file="GapJunctions/Ca_conc.nml"/>
    <Include file="GapJunctions/Ca_pyr.channel.nml"/>
    <Include file="GapJunctions/Kahp_pyr.channel.nml"/>
    <Include file="GapJunctions/Kdr_pyr.channel.nml"/>
    <Include file="GapJunctions/LeakConductance_pyr.channel.nml"/>
    <Include file="GapJunctions/Na_pyr.channel.nml"/>
    <Include file="GapJunctions.net.nml"/>

    <Simulation id="Sim_GapJunctions" length="1000.0ms" step="0.025ms" target="GapJunctions" seed="12345">  <!-- Note seed: ensures same random numbers used every run -->
        <Display id="Display_pop_post_v" title="Plots of Display_pop_post_v" timeScale="1ms" xmin="-100.0" xmax="1100.0" ymin="-80" ymax="40">
            <Line id="pop_post_0_pyr_4_sym_0_v" quantity="pop_post/0/pyr_4_sym/0/v" scale="1mV" color="#d54f33" timeScale="1ms"/>
            <Line id="pop_post_1_pyr_4_sym_0_v" quantity="pop_post/1/pyr_4_sym/0/v" scale="1mV" color="#0534e4" timeScale="1ms"/>
        </Display>

        <Display id="Display_pop_pre_v" title="Plots of Display_pop_pre_v" timeScale="1ms" xmin="-100.0" xmax="1100.0" ymin="-80" ymax="40">
            <Line id="pop_pre_0_pyr_4_sym_0_v" quantity="pop_pre/0/pyr_4_sym/0/v" scale="1mV" color="#98e752" timeScale="1ms"/>
            <Line id="pop_pre_1_pyr_4_sym_0_v" quantity="pop_pre/1/pyr_4_sym/0/v" scale="1mV" color="#bca074" timeScale="1ms"/>
            <Line id="pop_pre_2_pyr_4_sym_0_v" quantity="pop_pre/2/pyr_4_sym/0/v" scale="1mV" color="#632794" timeScale="1ms"/>
            <Line id="pop_pre_3_pyr_4_sym_0_v" quantity="pop_pre/3/pyr_4_sym/0/v" scale="1mV" color="#8a5d88" timeScale="1ms"/>
            <Line id="pop_pre_4_pyr_4_sym_0_v" quantity="pop_pre/4/pyr_4_sym/0/v" scale="1mV" color="#df5954" timeScale="1ms"/>
        </Display>

        <OutputFile id="Sim_GapJunctions_pop_post_v_dat" fileName="Sim_GapJunctions.pop_post.v.dat">
            <OutputColumn id="pop_post_0_pyr_4_sym_0_v" quantity="pop_post/0/pyr_4_sym/0/v"/>
            <OutputColumn id="pop_post_1_pyr_4_sym_0_v" quantity="pop_post/1/pyr_4_sym/0/v"/>
        </OutputFile>

        <OutputFile id="Sim_GapJunctions_pop_pre_v_dat" fileName="Sim_GapJunctions.pop_pre.v.dat">
            <OutputColumn id="pop_pre_0_pyr_4_sym_0_v" quantity="pop_pre/0/pyr_4_sym/0/v"/>
            <OutputColumn id="pop_pre_1_pyr_4_sym_0_v" quantity="pop_pre/1/pyr_4_sym/0/v"/>
            <OutputColumn id="pop_pre_2_pyr_4_sym_0_v" quantity="pop_pre/2/pyr_4_sym/0/v"/>
            <OutputColumn id="pop_pre_3_pyr_4_sym_0_v" quantity="pop_pre/3/pyr_4_sym/0/v"/>
            <OutputColumn id="pop_pre_4_pyr_4_sym_0_v" quantity="pop_pre/4/pyr_4_sym/0/v"/>
        </OutputFile>

    </Simulation>

</Lems>
