<Lems>

    <!--

        This LEMS file has been automatically generated using PyNeuroML v0.3.19 (libNeuroML v0.2.47)

     -->

    <!-- Specify which component to run -->
    <Target component="Sim_SimpleNet" reportFile="report.simple.txt"/>

    <!-- Include core NeuroML2 ComponentType definitions -->
    <Include file="Cells.xml"/>
    <Include file="Networks.xml"/>
    <Include file="Simulation.xml"/>

    <Include file="SimpleNet/RS.cell.nml"/>
    <Include file="SimpleNet.net.nml"/>

    <Simulation id="Sim_SimpleNet" length="500ms" step="0.025ms" target="SimpleNet" seed="12345">  <!-- Note seed: ensures same random numbers used every run -->

        <Display id="DispPop__RS_pop" title="Membrane potentials of cells in RS_pop" timeScale="1ms" xmin="-50.0" xmax="550.0" ymin="-90" ymax="50">
            <Line id="RS_pop[0]: v" quantity="RS_pop/0/RS/v" scale="1mV" color="#6aa799" timeScale="1ms"/>
            <Line id="RS_pop[1]: v" quantity="RS_pop/1/RS/v" scale="1mV" color="#029a72" timeScale="1ms"/>
            <Line id="RS_pop[2]: v" quantity="RS_pop/2/RS/v" scale="1mV" color="#d340bb" timeScale="1ms"/>
        </Display>

        <OutputFile id="Volts_file__RS_pop" fileName="Sim_SimpleNet.RS_pop.v.dat">
            <OutputColumn id="v_RS_pop_0_RS_v" quantity="RS_pop/0/RS/v"/>
            <OutputColumn id="v_RS_pop_1_RS_v" quantity="RS_pop/1/RS/v"/>
            <OutputColumn id="v_RS_pop_2_RS_v" quantity="RS_pop/2/RS/v"/>
        </OutputFile>

    </Simulation>

</Lems>
