<Lems>

    <!--

        This LEMS file has been automatically generated using PyNeuroML v0.1.9 (libNeuroML v0.2.12)

     -->

    <!-- Specify which component to run -->
    <Target component="Sim_SpikingNet"/>

    <!-- Include core NeuroML2 ComponentType definitions -->
    <Include file="Cells.xml"/>
    <Include file="Networks.xml"/>
    <Include file="Simulation.xml"/>

    <Include file="SpikingNet.net.nml"/>
    <Include file="../NeuroML2/prototypes/izhikevich/RS.cell.nml"/>
    <Include file="../NeuroML2/prototypes/izhikevich/RS.cell.nml"/>

    <Simulation id="Sim_SpikingNet" length="1000ms" step="0.01ms" target="SpikingNet" seed="12345">  <!-- Note seed: ensures same random numbers used every run -->

        <Display id="display_pop_pre" title="Voltages pop_pre" timeScale="1ms" xmin="-100.0" xmax="1100.0" ymin="-80" ymax="40">
            <Line id="pop_pre 0: Vm" quantity="pop_pre/0/RS/v" scale="1mV" color="#6016d6" timeScale="1ms"/>
            <Line id="pop_pre 1: Vm" quantity="pop_pre/1/RS/v" scale="1mV" color="#36c138" timeScale="1ms"/>
            <Line id="pop_pre 2: Vm" quantity="pop_pre/2/RS/v" scale="1mV" color="#b75b48" timeScale="1ms"/>
            <Line id="pop_pre 3: Vm" quantity="pop_pre/3/RS/v" scale="1mV" color="#966706" timeScale="1ms"/>
            <Line id="pop_pre 4: Vm" quantity="pop_pre/4/RS/v" scale="1mV" color="#0d7092" timeScale="1ms"/>
            <Line id="pop_pre 5: Vm" quantity="pop_pre/5/RS/v" scale="1mV" color="#e09f46" timeScale="1ms"/>
            <Line id="pop_pre 6: Vm" quantity="pop_pre/6/RS/v" scale="1mV" color="#70c837" timeScale="1ms"/>
            <Line id="pop_pre 7: Vm" quantity="pop_pre/7/RS/v" scale="1mV" color="#c6e211" timeScale="1ms"/>
            <Line id="pop_pre 8: Vm" quantity="pop_pre/8/RS/v" scale="1mV" color="#2a5275" timeScale="1ms"/>
            <Line id="pop_pre 9: Vm" quantity="pop_pre/9/RS/v" scale="1mV" color="#4ed3a8" timeScale="1ms"/>
        </Display>

        <Display id="display_pop_post" title="Voltages pop_post" timeScale="1ms" xmin="-100.0" xmax="1100.0" ymin="-80" ymax="40">
            <Line id="pop_post 0: Vm" quantity="pop_post/0/RS/v" scale="1mV" color="#12c583" timeScale="1ms"/>
            <Line id="pop_post 1: Vm" quantity="pop_post/1/RS/v" scale="1mV" color="#651e1c" timeScale="1ms"/>
            <Line id="pop_post 2: Vm" quantity="pop_post/2/RS/v" scale="1mV" color="#6dcd11" timeScale="1ms"/>
            <Line id="pop_post 3: Vm" quantity="pop_post/3/RS/v" scale="1mV" color="#aecbbc" timeScale="1ms"/>
            <Line id="pop_post 4: Vm" quantity="pop_post/4/RS/v" scale="1mV" color="#7ac645" timeScale="1ms"/>
            <Line id="pop_post 5: Vm" quantity="pop_post/5/RS/v" scale="1mV" color="#6687f2" timeScale="1ms"/>
            <Line id="pop_post 6: Vm" quantity="pop_post/6/RS/v" scale="1mV" color="#7a5bb7" timeScale="1ms"/>
            <Line id="pop_post 7: Vm" quantity="pop_post/7/RS/v" scale="1mV" color="#4800ae" timeScale="1ms"/>
            <Line id="pop_post 8: Vm" quantity="pop_post/8/RS/v" scale="1mV" color="#5e9938" timeScale="1ms"/>
            <Line id="pop_post 9: Vm" quantity="pop_post/9/RS/v" scale="1mV" color="#99b9f5" timeScale="1ms"/>
        </Display>

        <OutputFile id="Volts_file_pop_pre" fileName="v_pop_pre.dat">
            <OutputColumn id="v_0" quantity="pop_pre/0/RS/v"/>
            <OutputColumn id="v_1" quantity="pop_pre/1/RS/v"/>
            <OutputColumn id="v_2" quantity="pop_pre/2/RS/v"/>
            <OutputColumn id="v_3" quantity="pop_pre/3/RS/v"/>
            <OutputColumn id="v_4" quantity="pop_pre/4/RS/v"/>
            <OutputColumn id="v_5" quantity="pop_pre/5/RS/v"/>
            <OutputColumn id="v_6" quantity="pop_pre/6/RS/v"/>
            <OutputColumn id="v_7" quantity="pop_pre/7/RS/v"/>
            <OutputColumn id="v_8" quantity="pop_pre/8/RS/v"/>
            <OutputColumn id="v_9" quantity="pop_pre/9/RS/v"/>
        </OutputFile>

        <OutputFile id="Volts_file_pop_post" fileName="v_pop_post.dat">
            <OutputColumn id="v_0" quantity="pop_post/0/RS/v"/>
            <OutputColumn id="v_1" quantity="pop_post/1/RS/v"/>
            <OutputColumn id="v_2" quantity="pop_post/2/RS/v"/>
            <OutputColumn id="v_3" quantity="pop_post/3/RS/v"/>
            <OutputColumn id="v_4" quantity="pop_post/4/RS/v"/>
            <OutputColumn id="v_5" quantity="pop_post/5/RS/v"/>
            <OutputColumn id="v_6" quantity="pop_post/6/RS/v"/>
            <OutputColumn id="v_7" quantity="pop_post/7/RS/v"/>
            <OutputColumn id="v_8" quantity="pop_post/8/RS/v"/>
            <OutputColumn id="v_9" quantity="pop_post/9/RS/v"/>
        </OutputFile>

    </Simulation>

</Lems>
