<neuroml xmlns="http://www.neuroml.org/schema/neuroml2"  xmlns:xs="http://www.w3.org/2001/XMLSchema" xmlns:xsi="http://www.w3.org/2001/XMLSchema-instance" xsi:schemaLocation="http://www.neuroml.org/schema/neuroml2 https://raw.github.com/NeuroML/NeuroML2/development/Schemas/NeuroML2/NeuroML_v2.2.xsd" id="VClamp">
    <notes>

This NeuroML 2 file was generated by OpenCortex v0.1.11 using:
    libNeuroML v0.2.56
    pyNeuroML v0.5.13

    </notes>
    <property tag="Network seed" value="1234"/>
    <include href="VClamp/L23PyrRS.cell.nml"/>
    <include href="VClamp/ar__m00_25.channel.nml"/>
    <include href="VClamp/cad__beta0_01__phi26000.nml"/>
    <include href="VClamp/cad__beta0_05__phi52000.nml"/>
    <include href="VClamp/cal.channel.nml"/>
    <include href="VClamp/cat.channel.nml"/>
    <include href="VClamp/k2.channel.nml"/>
    <include href="VClamp/ka.channel.nml"/>
    <include href="VClamp/kahp.channel.nml"/>
    <include href="VClamp/kc.channel.nml"/>
    <include href="VClamp/kdr.channel.nml"/>
    <include href="VClamp/km.channel.nml"/>
    <include href="VClamp/naf__a0__b0__c0__d0__fastNa_shiftmin3_5.channel.nml"/>
    <include href="VClamp/nap.channel.nml"/>
    <include href="VClamp/pas.channel.nml"/>
    <expTwoSynapse id="syn0" gbase="1nS" erev="0mV" tauDecay="10ms" tauRise="0.5ms"/>
    <voltageClampTriple id="vclamp_cell1_seg0" active="1.0" delay="0ms" duration="500ms" conditioningVoltage="-70mV" testingVoltage="-70mV" returnVoltage="-70mV" simpleSeriesResistance="1e1ohm"/>
    <voltageClampTriple id="vclamp_cell2_seg0" active="1.0" delay="0ms" duration="500ms" conditioningVoltage="-70mV" testingVoltage="-70mV" returnVoltage="-70mV" simpleSeriesResistance="1e1ohm"/>
    <voltageClampTriple id="vclamp_cell2_seg142" active="1.0" delay="0ms" duration="500ms" conditioningVoltage="-70mV" testingVoltage="-70mV" returnVoltage="-70mV" simpleSeriesResistance="1e1ohm"/>
    <voltageClampTriple id="vclamp_cell3_seg0" active="1.0" delay="0ms" duration="500ms" conditioningVoltage="-70mV" testingVoltage="-70mV" returnVoltage="-70mV" simpleSeriesResistance="1e1ohm"/>
    <voltageClampTriple id="vclamp_cell3_seg142" active="1.0" delay="0ms" duration="500ms" conditioningVoltage="-70mV" testingVoltage="-70mV" returnVoltage="-70mV" simpleSeriesResistance="1e1ohm"/>
    <voltageClampTriple id="vclamp_cell3_seg87" active="1.0" delay="0ms" duration="500ms" conditioningVoltage="-70mV" testingVoltage="-70mV" returnVoltage="-70mV" simpleSeriesResistance="1e1ohm"/>
    <transientPoissonFiringSynapse id="poissonFiringSyn" averageRate="20 Hz" delay="50 ms" duration="400 ms" synapse="syn0" spikeTarget="./syn0"/>
    <network id="VClamp" type="networkWithTemperature" temperature="32degC">
        <population id="popRS" component="L23PyrRS" size="4" type="populationList">
            <instance id="0">
                <location x="966.453539999999975" y="8.81465" z="0.14983"/>
            </instance>
            <instance id="1">
                <location x="910.975959999999986" y="18.78538" z="11.644550000000001"/>
            </instance>
            <instance id="2">
                <location x="671.563480000000027" y="1.67876" z="15.32962"/>
            </instance>
            <instance id="3">
                <location x="236.809779999999989" y="0.61628" z="15.775449999999999"/>
            </instance>
        </population>
        <inputList id="pfs_noise" population="popRS" component="poissonFiringSyn">
            <input id="0" target="../popRS/0/L23PyrRS" destination="synapses" segmentId="48" fractionAlong="0.37593985997307755"/>
            <input id="1" target="../popRS/0/L23PyrRS" destination="synapses" segmentId="87" fractionAlong="0.5197751671183857"/>
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        </inputList>
        <inputList id="input_vClamp_cell1_seg0" population="popRS" component="vclamp_cell1_seg0">
            <input id="0" target="../popRS/1/L23PyrRS" destination="synapses" segmentId="0" fractionAlong="0.5"/>
        </inputList>
        <inputList id="input_vClamp_cell2_seg0" population="popRS" component="vclamp_cell2_seg0">
            <input id="0" target="../popRS/2/L23PyrRS" destination="synapses" segmentId="0" fractionAlong="0.5"/>
        </inputList>
        <inputList id="input_vClamp_cell2_seg142" population="popRS" component="vclamp_cell2_seg142">
            <input id="0" target="../popRS/2/L23PyrRS" destination="synapses" segmentId="142" fractionAlong="0.5"/>
        </inputList>
        <inputList id="input_vClamp_cell3_seg0" population="popRS" component="vclamp_cell3_seg0">
            <input id="0" target="../popRS/3/L23PyrRS" destination="synapses" segmentId="0" fractionAlong="0.5"/>
        </inputList>
        <inputList id="input_vClamp_cell3_seg142" population="popRS" component="vclamp_cell3_seg142">
            <input id="0" target="../popRS/3/L23PyrRS" destination="synapses" segmentId="142" fractionAlong="0.5"/>
        </inputList>
        <inputList id="input_vClamp_cell3_seg87" population="popRS" component="vclamp_cell3_seg87">
            <input id="0" target="../popRS/3/L23PyrRS" destination="synapses" segmentId="87" fractionAlong="0.5"/>
        </inputList>
    </network>
</neuroml>
